# OpenSim document version 40000
ForceSet gait2354_CMC:
  PointActuator FX: body=calcn_r point=(0 0 0) point_is_global=false direction=(-1 0 0) force_is_global=true
      optimal_force=100
  PointActuator FY: body=calcn_r point=(0 0 0) point_is_global=false direction=(0 -1 0) force_is_global=true
      optimal_force=200
  PointActuator FZ: body=calcn_r point=(0 0 0) point_is_global=false direction=(0 0 -1) force_is_global=true
      optimal_force=100
  TorqueActuator MX: bodyA=calcn_r bodyB=ground torque_is_global=true axis=(-1 0 0) optimal_force=80
  TorqueActuator MY: bodyA=calcn_r bodyB=ground torque_is_global=true axis=(0 -1 0) optimal_force=80
  TorqueActuator MZ: bodyA=calcn_r bodyB=ground torque_is_global=true axis=(0 0 -1) optimal_force=80
