# OpenSim document version 40000
ControlSet gait2354_CMC:
  defaults: ControlLinear default: is_model_control=true extrapolate=true default_min=0,02 default_max=1
      filter_on=false use_steps=true kp=100 kv=20
  ControlLinear [values shared by the 6 below unless stated]: default_min=-1 default_max=1 use_steps=false
  ControlLinear FX.excitation
  ControlLinear FY.excitation
  ControlLinear FZ.excitation
  ControlLinear MX.excitation
  ControlLinear MY.excitation
  ControlLinear MZ.excitation
