# OpenSim document version 40000
CMC_TaskSet gait2354_CMC:
  defaults: CMC_Joint default: on=false weight=(1 1 1) wrt_body=-1 express_body=-1 active=(false false false)
      kp=(1 1 1) kv=(1 1 1) ka=(1 1 1) r0=(0 0 0) r1=(0 0 0) r2=(0 0 0) limit=0
  CMC_Joint [values shared by the 7 below unless stated]: weight=100 wrt_body=-1 express_body=-1
      active=(true false false) kp=100 kv=20
  CMC_Joint hip_flexion_l: coordinate=hip_flexion_l
  CMC_Joint hip_adduction_l: coordinate=hip_adduction_l
  CMC_Joint hip_rotation_l: coordinate=hip_rotation_l
  CMC_Joint knee_angle_l: coordinate=knee_angle_l
  CMC_Joint ankle_angle_l: coordinate=ankle_angle_l
  CMC_Joint subtalar_angle_l: coordinate=subtalar_angle_l
  CMC_Joint mtp_angle_l: coordinate=mtp_angle_l
