# OpenSim document version 40000
CMC_TaskSet gait2354_CMC:
  defaults: CMC_Joint default: on=false weight=(1 1 1) wrt_body=-1 express_body=-1 active=(false false false)
      kp=(1 1 1) kv=(1 1 1) ka=(1 1 1) r0=(0 0 0) r1=(0 0 0) r2=(0 0 0) limit=0
  CMC_Joint [values shared by the 7 below unless stated]: weight=100 wrt_body=-1 express_body=-1
      active=(true false false) kp=100 kv=20
  CMC_Joint hip_flexion_r: coordinate=hip_flexion_r
  CMC_Joint hip_adduction_r: coordinate=hip_adduction_r
  CMC_Joint hip_rotation_r: coordinate=hip_rotation_r
  CMC_Joint knee_angle_r: coordinate=knee_angle_r
  CMC_Joint ankle_angle_r: coordinate=ankle_angle_r
  CMC_Joint subtalar_angle_r: coordinate=subtalar_angle_r
  CMC_Joint mtp_angle_r: coordinate=mtp_angle_r
