# OpenSim document version 40000
ControlSet Control Set:
  ControlLinear [values shared by the 113 below unless stated]: is_model_control=true extrapolate=true default_min=0.02
      default_max=1 filter_on=false use_steps=false kp=100 kv=20
  ControlLinear addbrev_r.excitation:
    x_nodes:
      ControlLinearNode: t=0 value=0.02
      ControlLinearNode: t=1 value=0.02
  ControlLinear addlong_r.excitation:
    x_nodes:
      ControlLinearNode: t=0 value=0.02
      ControlLinearNode: t=1 value=0.02
  ControlLinear addmagDist_r.excitation:
    x_nodes:
      ControlLinearNode: t=0 value=0.02
      ControlLinearNode: t=1 value=0.02
  ControlLinear addmagIsch_r.excitation:
    x_nodes:
      ControlLinearNode: t=0 value=0.02
      ControlLinearNode: t=1 value=0.02
  ControlLinear addmagMid_r.excitation:
    x_nodes:
      ControlLinearNode: t=0 value=0.02
      ControlLinearNode: t=1 value=0.02
  ControlLinear addmagProx_r.excitation:
    x_nodes:
      ControlLinearNode: t=0 value=0.02
      ControlLinearNode: t=1 value=0.02
  ControlLinear bflh_r.excitation:
    x_nodes:
      ControlLinearNode: t=0 value=0.02
      ControlLinearNode: t=1 value=0.02
  ControlLinear bfsh_r.excitation:
    x_nodes:
      ControlLinearNode: t=0 value=0.02
      ControlLinearNode: t=1 value=0.02
  ControlLinear edl_r.excitation:
    x_nodes:
      ControlLinearNode: t=0 value=0.022
      ControlLinearNode: t=1 value=0.022
  ControlLinear ehl_r.excitation:
    x_nodes:
      ControlLinearNode: t=0 value=0.022
      ControlLinearNode: t=1 value=0.022
  ControlLinear fdl_r.excitation:
    x_nodes:
      ControlLinearNode: t=0 value=0.02
      ControlLinearNode: t=1 value=0.02
  ControlLinear fhl_r.excitation:
    x_nodes:
      ControlLinearNode: t=0 value=0.02
      ControlLinearNode: t=1 value=0.02
  ControlLinear gaslat_r.excitation:
    x_nodes:
      ControlLinearNode: t=0 value=0.02
      ControlLinearNode: t=1 value=0.02
  ControlLinear gasmed_r.excitation:
    x_nodes:
      ControlLinearNode: t=0 value=0.02
      ControlLinearNode: t=1 value=0.02
  ControlLinear glmax1_r.excitation:
    x_nodes:
      ControlLinearNode: t=0 value=0.02
      ControlLinearNode: t=1 value=0.02
  ControlLinear glmax2_r.excitation:
    x_nodes:
      ControlLinearNode: t=0 value=0.02
      ControlLinearNode: t=1 value=0.02
  ControlLinear glmax3_r.excitation:
    x_nodes:
      ControlLinearNode: t=0 value=0.02
      ControlLinearNode: t=1 value=0.02
  ControlLinear glmed1_r.excitation:
    x_nodes:
      ControlLinearNode: t=0 value=0.7760981
      ControlLinearNode: t=1 value=0.7760981
  ControlLinear glmed2_r.excitation:
    x_nodes:
      ControlLinearNode: t=0 value=0.2569217
      ControlLinearNode: t=1 value=0.2569217
  ControlLinear glmed3_r.excitation:
    x_nodes:
      ControlLinearNode: t=0 value=0.1050666
      ControlLinearNode: t=1 value=0.1050666
  ControlLinear glmin1_r.excitation:
    x_nodes:
      ControlLinearNode: t=0 value=0.21385
      ControlLinearNode: t=1 value=0.21385
  ControlLinear glmin2_r.excitation:
    x_nodes:
      ControlLinearNode: t=0 value=0.1140687
      ControlLinearNode: t=1 value=0.1140687
  ControlLinear glmin3_r.excitation:
    x_nodes:
      ControlLinearNode: t=0 value=0.02
      ControlLinearNode: t=1 value=0.02
  ControlLinear grac_r.excitation:
    x_nodes:
      ControlLinearNode: t=0 value=0.02
      ControlLinearNode: t=1 value=0.02
  ControlLinear iliacus_r.excitation:
    x_nodes:
      ControlLinearNode: t=0 value=0.08999315
      ControlLinearNode: t=1 value=0.08999315
  ControlLinear perbrev_r.excitation:
    x_nodes:
      ControlLinearNode: t=0 value=0.02
      ControlLinearNode: t=1 value=0.02
  ControlLinear perlong_r.excitation:
    x_nodes:
      ControlLinearNode: t=0 value=0.02
      ControlLinearNode: t=1 value=0.02
  ControlLinear piri_r.excitation:
    x_nodes:
      ControlLinearNode: t=0 value=0.03893118
      ControlLinearNode: t=1 value=0.03893118
  ControlLinear psoas_r.excitation:
    x_nodes:
      ControlLinearNode: t=0 value=0.02
      ControlLinearNode: t=1 value=0.02
  ControlLinear recfem_r.excitation:
    x_nodes:
      ControlLinearNode: t=0 value=0.08888109
      ControlLinearNode: t=1 value=0.08888109
  ControlLinear sart_r.excitation:
    x_nodes:
      ControlLinearNode: t=0 value=0.02
      ControlLinearNode: t=1 value=0.02
  ControlLinear semimem_r.excitation:
    x_nodes:
      ControlLinearNode: t=0 value=0.02
      ControlLinearNode: t=1 value=0.02
  ControlLinear semiten_r.excitation:
    x_nodes:
      ControlLinearNode: t=0 value=0.02
      ControlLinearNode: t=1 value=0.02
  ControlLinear soleus_r.excitation:
    x_nodes:
      ControlLinearNode: t=0 value=0.02371609
      ControlLinearNode: t=1 value=0.02371609
  ControlLinear tfl_r.excitation:
    x_nodes:
      ControlLinearNode: t=0 value=0.03776485
      ControlLinearNode: t=1 value=0.03776485
  ControlLinear tibant_r.excitation:
    x_nodes:
      ControlLinearNode: t=0 value=0.02
      ControlLinearNode: t=1 value=0.02
  ControlLinear tibpost_r.excitation:
    x_nodes:
      ControlLinearNode: t=0 value=0.02
      ControlLinearNode: t=1 value=0.02
  ControlLinear vasint_r.excitation:
    x_nodes:
      ControlLinearNode: t=0 value=0.02
      ControlLinearNode: t=1 value=0.02
  ControlLinear vaslat_r.excitation:
    x_nodes:
      ControlLinearNode: t=0 value=0.02
      ControlLinearNode: t=1 value=0.02
  ControlLinear vasmed_r.excitation:
    x_nodes:
      ControlLinearNode: t=0 value=0.02
      ControlLinearNode: t=1 value=0.02
  ControlLinear addbrev_l.excitation:
    x_nodes:
      ControlLinearNode: t=0 value=0.022
      ControlLinearNode: t=1 value=0.022
  ControlLinear addlong_l.excitation:
    x_nodes:
      ControlLinearNode: t=0 value=0.024
      ControlLinearNode: t=1 value=0.024
  ControlLinear addmagDist_l.excitation:
    x_nodes:
      ControlLinearNode: t=0 value=0.02
      ControlLinearNode: t=1 value=0.02
  ControlLinear addmagIsch_l.excitation:
    x_nodes:
      ControlLinearNode: t=0 value=0.02
      ControlLinearNode: t=1 value=0.02
  ControlLinear addmagMid_l.excitation:
    x_nodes:
      ControlLinearNode: t=0 value=0.02
      ControlLinearNode: t=1 value=0.02
  ControlLinear addmagProx_l.excitation:
    x_nodes:
      ControlLinearNode: t=0 value=0.02
      ControlLinearNode: t=1 value=0.02
  ControlLinear bflh_l.excitation:
    x_nodes:
      ControlLinearNode: t=0 value=0.02
      ControlLinearNode: t=1 value=0.02
  ControlLinear bfsh_l.excitation:
    x_nodes:
      ControlLinearNode: t=0 value=0.3136681
      ControlLinearNode: t=1 value=0.3136681
  ControlLinear edl_l.excitation:
    x_nodes:
      ControlLinearNode: t=0 value=0.368671
      ControlLinearNode: t=1 value=0.368671
  ControlLinear ehl_l.excitation:
    x_nodes:
      ControlLinearNode: t=0 value=0.05741242
      ControlLinearNode: t=1 value=0.05741242
  ControlLinear fdl_l.excitation:
    x_nodes:
      ControlLinearNode: t=0 value=0.02
      ControlLinearNode: t=1 value=0.02
  ControlLinear fhl_l.excitation:
    x_nodes:
      ControlLinearNode: t=0 value=0.02
      ControlLinearNode: t=1 value=0.02
  ControlLinear gaslat_l.excitation:
    x_nodes:
      ControlLinearNode: t=0 value=0.02
      ControlLinearNode: t=1 value=0.02
  ControlLinear gasmed_l.excitation:
    x_nodes:
      ControlLinearNode: t=0 value=0.02
      ControlLinearNode: t=1 value=0.02
  ControlLinear glmax1_l.excitation:
    x_nodes:
      ControlLinearNode: t=0 value=0.02
      ControlLinearNode: t=1 value=0.02
  ControlLinear glmax2_l.excitation:
    x_nodes:
      ControlLinearNode: t=0 value=0.02
      ControlLinearNode: t=1 value=0.02
  ControlLinear glmax3_l.excitation:
    x_nodes:
      ControlLinearNode: t=0 value=0.02
      ControlLinearNode: t=1 value=0.02
  ControlLinear glmed1_l.excitation:
    x_nodes:
      ControlLinearNode: t=0 value=0.02
      ControlLinearNode: t=1 value=0.02
  ControlLinear glmed2_l.excitation:
    x_nodes:
      ControlLinearNode: t=0 value=0.02
      ControlLinearNode: t=1 value=0.02
  ControlLinear glmed3_l.excitation:
    x_nodes:
      ControlLinearNode: t=0 value=0.02
      ControlLinearNode: t=1 value=0.02
  ControlLinear glmin1_l.excitation:
    x_nodes:
      ControlLinearNode: t=0 value=0.05954954
      ControlLinearNode: t=1 value=0.05954954
  ControlLinear glmin2_l.excitation:
    x_nodes:
      ControlLinearNode: t=0 value=0.04469673
      ControlLinearNode: t=1 value=0.04469673
  ControlLinear glmin3_l.excitation:
    x_nodes:
      ControlLinearNode: t=0 value=0.024
      ControlLinearNode: t=1 value=0.024
  ControlLinear grac_l.excitation:
    x_nodes:
      ControlLinearNode: t=0 value=0.123068
      ControlLinearNode: t=1 value=0.123068
  ControlLinear iliacus_l.excitation:
    x_nodes:
      ControlLinearNode: t=0 value=0.4531614
      ControlLinearNode: t=1 value=0.4531614
  ControlLinear perbrev_l.excitation:
    x_nodes:
      ControlLinearNode: t=0 value=0.02
      ControlLinearNode: t=1 value=0.02
  ControlLinear perlong_l.excitation:
    x_nodes:
      ControlLinearNode: t=0 value=0.02
      ControlLinearNode: t=1 value=0.02
  ControlLinear piri_l.excitation:
    x_nodes:
      ControlLinearNode: t=0 value=0.022
      ControlLinearNode: t=1 value=0.022
  ControlLinear psoas_l.excitation:
    x_nodes:
      ControlLinearNode: t=0 value=0.3938277
      ControlLinearNode: t=1 value=0.3938277
  ControlLinear recfem_l.excitation:
    x_nodes:
      ControlLinearNode: t=0 value=0.02
      ControlLinearNode: t=1 value=0.02
  ControlLinear sart_l.excitation:
    x_nodes:
      ControlLinearNode: t=0 value=0.3279944
      ControlLinearNode: t=1 value=0.3279944
  ControlLinear semimem_l.excitation:
    x_nodes:
      ControlLinearNode: t=0 value=0.022
      ControlLinearNode: t=1 value=0.022
  ControlLinear semiten_l.excitation:
    x_nodes:
      ControlLinearNode: t=0 value=0.022
      ControlLinearNode: t=1 value=0.022
  ControlLinear soleus_l.excitation:
    x_nodes:
      ControlLinearNode: t=0 value=0.02
      ControlLinearNode: t=1 value=0.02
  ControlLinear tfl_l.excitation:
    x_nodes:
      ControlLinearNode: t=0 value=0.2532042
      ControlLinearNode: t=1 value=0.2532042
  ControlLinear tibant_l.excitation:
    x_nodes:
      ControlLinearNode: t=0 value=0.8216525
      ControlLinearNode: t=1 value=0.8216525
  ControlLinear tibpost_l.excitation:
    x_nodes:
      ControlLinearNode: t=0 value=0.02
      ControlLinearNode: t=1 value=0.02
  ControlLinear vasint_l.excitation:
    x_nodes:
      ControlLinearNode: t=0 value=0.02
      ControlLinearNode: t=1 value=0.02
  ControlLinear vaslat_l.excitation:
    x_nodes:
      ControlLinearNode: t=0 value=0.02
      ControlLinearNode: t=1 value=0.02
  ControlLinear vasmed_l.excitation:
    x_nodes:
      ControlLinearNode: t=0 value=0.02
      ControlLinearNode: t=1 value=0.02
  ControlLinear lumbar_ext.excitation:
    x_nodes:
      ControlLinearNode: t=0 value=0.1325461
      ControlLinearNode: t=1 value=0.1325461
  ControlLinear lumbar_bend.excitation:
    x_nodes:
      ControlLinearNode: t=0 value=-0.9199507
      ControlLinearNode: t=1 value=-0.9199507
  ControlLinear lumbar_rot.excitation:
    x_nodes:
      ControlLinearNode: t=0 value=0.2101942
      ControlLinearNode: t=1 value=0.2101942
  ControlLinear shoulder_flex_r.excitation:
    x_nodes:
      ControlLinearNode: t=0 value=-0.09684
      ControlLinearNode: t=1 value=-0.09684
  ControlLinear shoulder_add_r.excitation:
    x_nodes:
      ControlLinearNode: t=0 value=-0.1704554
      ControlLinearNode: t=1 value=-0.1704554
  ControlLinear shoulder_rot_r.excitation:
    x_nodes:
      ControlLinearNode: t=0 value=-0.02269676
      ControlLinearNode: t=1 value=-0.02269676
  ControlLinear elbow_flex_r.excitation:
    x_nodes:
      ControlLinearNode: t=0 value=0.07856294
      ControlLinearNode: t=1 value=0.07856294
  ControlLinear pro_sup_r.excitation:
    x_nodes:
      ControlLinearNode: t=0 value=6.721e-5
      ControlLinearNode: t=1 value=6.721e-5
  ControlLinear wrist_flex_r.excitation:
    x_nodes:
      ControlLinearNode: t=0 value=2.958e-5
      ControlLinearNode: t=1 value=2.958e-5
  ControlLinear wrist_dev_r.excitation:
    x_nodes:
      ControlLinearNode: t=0 value=4.1e-5
      ControlLinearNode: t=1 value=4.1e-5
  ControlLinear shoulder_flex_l.excitation:
    x_nodes:
      ControlLinearNode: t=0 value=-0.00116377
      ControlLinearNode: t=1 value=-0.00116377
  ControlLinear shoulder_add_l.excitation:
    x_nodes:
      ControlLinearNode: t=0 value=-0.2862585
      ControlLinearNode: t=1 value=-0.2862585
  ControlLinear shoulder_rot_l.excitation:
    x_nodes:
      ControlLinearNode: t=0 value=-0.03920493
      ControlLinearNode: t=1 value=-0.03920493
  ControlLinear elbow_flex_l.excitation:
    x_nodes:
      ControlLinearNode: t=0 value=0.1236152
      ControlLinearNode: t=1 value=0.1236152
  ControlLinear pro_sup_l.excitation:
    x_nodes:
      ControlLinearNode: t=0 value=6.832e-5
      ControlLinearNode: t=1 value=6.832e-5
  ControlLinear wrist_flex_l.excitation:
    x_nodes:
      ControlLinearNode: t=0 value=6.97e-6
      ControlLinearNode: t=1 value=6.97e-6
  ControlLinear wrist_dev_l.excitation:
    x_nodes:
      ControlLinearNode: t=0 value=4.057e-5
      ControlLinearNode: t=1 value=4.057e-5
  ControlLinear FX.excitation:
    x_nodes:
      ControlLinearNode: t=0 value=-4.928081
      ControlLinearNode: t=1 value=-4.928081
  ControlLinear FY.excitation:
    x_nodes:
      ControlLinearNode: t=0 value=1.066707
      ControlLinearNode: t=1 value=1.066707
  ControlLinear FZ.excitation:
    x_nodes:
      ControlLinearNode: t=0 value=-4.804448
      ControlLinearNode: t=1 value=-4.804448
  ControlLinear MX.excitation:
    x_nodes:
      ControlLinearNode: t=0 value=-0.332396
      ControlLinearNode: t=1 value=-0.332396
  ControlLinear MY.excitation:
    x_nodes:
      ControlLinearNode: t=0 value=0.6682244
      ControlLinearNode: t=1 value=0.6682244
  ControlLinear MZ.excitation:
    x_nodes:
      ControlLinearNode: t=0 value=0.4462007
      ControlLinearNode: t=1 value=0.4462007
  ControlLinear hip_flexion_r_reserve.excitation:
    x_nodes:
      ControlLinearNode: t=0 value=-0.00040765
      ControlLinearNode: t=1 value=-0.00040765
  ControlLinear hip_adduction_r_reserve.excitation:
    x_nodes:
      ControlLinearNode: t=0 value=-0.01081408
      ControlLinearNode: t=1 value=-0.01081408
  ControlLinear hip_rotation_r_reserve.excitation:
    x_nodes:
      ControlLinearNode: t=0 value=0.00623154
      ControlLinearNode: t=1 value=0.00623154
  ControlLinear knee_angle_r_reserve.excitation:
    x_nodes:
      ControlLinearNode: t=0 value=0.00074906
      ControlLinearNode: t=1 value=0.00074906
  ControlLinear ankle_angle_r_reserve.excitation:
    x_nodes:
      ControlLinearNode: t=0 value=-3.42e-5
      ControlLinearNode: t=1 value=-3.42e-5
  ControlLinear hip_flexion_l_reserve.excitation:
    x_nodes:
      ControlLinearNode: t=0 value=0.0219366
      ControlLinearNode: t=1 value=0.0219366
  ControlLinear hip_adduction_l_reserve.excitation:
    x_nodes:
      ControlLinearNode: t=0 value=-0.01095116
      ControlLinearNode: t=1 value=-0.01095116
  ControlLinear hip_rotation_l_reserve.excitation:
    x_nodes:
      ControlLinearNode: t=0 value=0.00066019
      ControlLinearNode: t=1 value=0.00066019
  ControlLinear knee_angle_l_reserve.excitation:
    x_nodes:
      ControlLinearNode: t=0 value=0.02606264
      ControlLinearNode: t=1 value=0.02606264
  ControlLinear ankle_angle_l_reserve.excitation:
    x_nodes:
      ControlLinearNode: t=0 value=0.01088198
      ControlLinearNode: t=1 value=0.01088198
