# OpenSim document version 40000
Model model_final:
  gravity: 0 -9.80665 0
  length_units: meters
  force_units: N
  credits:
    Rajagopal, A, Dembia, C.L., DeMers, M.S., Delp, D.D., Hicks, J.L., and Delp, S.L.
  publications:
    Rajagopal, Apoorva, et al. "Full-Body Musculoskeletal Model for Muscle-Driven Simulation of Human Gait." IEEE Transactions on Biomedical Engineering 63.10 (2016): 2068-2079. (2016)
  PhysicalOffsetFrame weld_offset_frame: socket_parent=/ground translation=(0 0 0) [meters]
  Ground
  BodySet:
    Body pelvis: mass=12.74759 [kg] mass_center=(-0.07374 0 0) inertia=(0.1274179 0.1079582 0.07176554 0 0 0)
        meshes=(r_pelvis.vtp l_pelvis.vtp sacrum.vtp)
      WrapCylinder Gmax1_at_pelvis_r: xyz_body_rotation=(-0.6 0.45 0) translation=(-0.08031089 -0.09809402 0.06362292)
          quadrant=-x radius=0.04095391 length=0.1544656
      WrapCylinder Gmax2_at_pelvis_r: xyz_body_rotation=(-0.75 0.39 0) translation=(-0.08343989 -0.08224044 0.07092391)
          quadrant=all radius=0.04109981 length=0.1022589
      WrapCylinder Gmax3_at_pelvis_r: xyz_body_rotation=(-0.1 0 0) translation=(-0.08656889 -0.08719469 0.07092391)
          quadrant=all radius=0.04068761 length=0.1042492
      WrapCylinder Gmax1_at_pelvis_l: xyz_body_rotation=(0.6 -0.45 0) translation=(-0.08031089 -0.09809402 -0.06362292)
          quadrant=-x radius=0.04095391 length=0.1544656
      WrapCylinder Gmax2_at_pelvis_l: xyz_body_rotation=(0.75 -0.39 0)
          translation=(-0.08343989 -0.08224044 -0.07092391) quadrant=all radius=0.04109981 length=0.1022589
      WrapCylinder Gmax3_at_pelvis_l: xyz_body_rotation=(0.1 0 0) translation=(-0.08656889 -0.08719469 -0.07092391)
          quadrant=all radius=0.04068761 length=0.1042492
      WrapCylinder PS_at_brim_r: xyz_body_rotation=(-0.25 -0.27 0.1) translation=(-0.0771819 -0.05945092 0.06842071)
          quadrant=-y radius=0.05092375 length=0.1040104
      WrapCylinder PS_at_brim_l: xyz_body_rotation=(0.25 0.27 0.1) translation=(-0.0771819 -0.05945092 -0.06842071)
          quadrant=-y radius=0.05092375 length=0.1040104
      WrapCylinder IL_at_brim_r: xyz_body_rotation=(-0.32 -0.24 0.9) translation=(-0.0740529 -0.06440517 0.0788507)
          quadrant=-y radius=0.05597878 length=0.1038241
      WrapCylinder IL_at_brim_l: xyz_body_rotation=(0.32 0.24 0.9) translation=(-0.0740529 -0.06440517 -0.0788507)
          quadrant=-y radius=0.05597878 length=0.1038241
    Body femur_r: mass=12.24703 mass_center=(0 -0.1860674 0) inertia=(0.2112058 0.05536462 0.2227204 0 0 0)
        meshes=r_femur.vtp
      WrapCylinder Gastroc_at_condyles_r: translation=(0.00547257 -0.4487507 0) quadrant=all radius=0.02736285
          length=0.1094514
      WrapCylinder KnExt_at_fem_r: xyz_body_rotation=(-0.0623366 0.0507601 0)
          translation=(0.003927423 -0.4407958 0.002288749) quadrant=all radius=0.02736285 length=0.1094514
      WrapCylinder AB_at_femshaft_r: xyz_body_rotation=(1.66157 0.186644 0)
          translation=(0.01602741 -0.1232368 0.02557332) quadrant=all radius=0.01805948 length=0.07661598
      WrapCylinder AL_at_femshaft_r: xyz_body_rotation=(1.77711 0.136489 0)
          translation=(0.03363737 -0.2538276 0.01654216) quadrant=all radius=0.02199973 length=0.1094514
      WrapCylinder AMprox_at_femshaft_r: xyz_body_rotation=(1.61126 0.18656 0)
          translation=(0.005672855 -0.07978438 0.02780394) quadrant=all radius=0.02309424 length=0.07661598
      WrapCylinder AMmid_at_femshaft_r: xyz_body_rotation=(1.61139 0.13656 0)
          translation=(0.0251875 -0.1759004 0.02252969) quadrant=all radius=0.0234226 length=0.1313417
      WrapCylinder AMdist_at_femshaft_r: xyz_body_rotation=(1.71188 0.186636 0)
          translation=(0.03459376 -0.2853792 0.01024969) quadrant=all radius=0.0238604 length=0.2189028
      WrapCylinder AMisch_at_condyles_r: xyz_body_rotation=(1.71115 -0.463363 0)
          translation=(-0.02479195 -0.4124468 -0.003452502) quadrant=all radius=0.04378056 length=0.2626834
      WrapCylinder PECT_at_femshaft_r: xyz_body_rotation=(1.81295 0.276344 0)
          translation=(0.006660916 -0.0924896 0.03331755) quadrant=all radius=0.01641771 length=0.0547257
    Body tibia_r: mass=5.424605 mass_center=(0 -0.2116575 0) inertia=(0.09477555 0.009590383 0.09609188 0 0 0)
        meshes=(r_tibia.vtp r_fibula.vtp)
      WrapCylinder GasLat_at_shank_r: xyz_body_rotation=(2.96723 -0.279725 -1.47812)
          translation=(-0.008389211 -0.08389211 -0.003741135) quadrant=-y radius=0.06235225 length=0.1133677
      WrapCylinder GasMed_at_shank_r: xyz_body_rotation=(2.96723 0.0279725 -1.47812)
          translation=(-0.008389211 -0.08389211 -0.003741135) quadrant=-y radius=0.06235225 length=0.1133677
      WrapCylinder GR_at_condyles_r: xyz_body_rotation=(0 -0.4 0) translation=(-0.003401032 -0.02267354 0) quadrant=all
          radius=0.04081238 length=0.1133677
      WrapCylinder SM_at_condyles_r: xyz_body_rotation=(0 -0.1 0) translation=(-0.001133677 -0.02267354 0) quadrant=all
          radius=0.03990544 length=0.1133677
      WrapCylinder ST_at_condyles_r: xyz_body_rotation=(0 -0.2 0) translation=(-0.002267354 -0.02324038 0) quadrant=all
          radius=0.04818128 length=0.1133677
      WrapCylinder BF_at_gastroc_r: translation=(-0.06575328 -0.06802063 0) quadrant=y radius=0.03401032
          length=0.1700516
    Body patella_r: mass=0.1134984 mass_center=(0.001970125 0.02889517 0)
        inertia=(4.526965e-6 2.067892e-5 2.067892e-5 0 0 0) meshes=r_patella.vtp
    Body talus_r: mass=0.1463144 mass_center=(0 0 0) inertia=(0.001880467 0.001880467 0.001880467 0 0 0)
        meshes=r_talus.vtp
    Body calcn_r: mass=1.34206 mass_center=(0.1022542 0.03067625 0) inertia=(0.001571637 0.004378131 0.00460265 0 0 0)
        meshes=r_foot.vtp
    Body toes_r: mass=0.2325522 mass_center=(0.03537995 0.006135251 -0.01789448)
        inertia=(0.0001122598 0.0002245195 0.001122598 0 0 0) meshes=r_bofoot.vtp
    Body femur_l: mass=12.24703 mass_center=(0 -0.1860674 0) inertia=(0.2112058 0.05536462 0.2227204 0 0 0)
        meshes=l_femur.vtp
      WrapCylinder Gastroc_at_condyles_l: translation=(0.00547257 -0.4487507 0) quadrant=all radius=0.02736285
          length=0.1094514
      WrapCylinder KnExt_at_fem_l: xyz_body_rotation=(0.0623366 -0.0507601 0)
          translation=(0.003927423 -0.4407958 -0.002288749) quadrant=all radius=0.02736285 length=0.1094514
      WrapCylinder AB_at_femshaft_l: xyz_body_rotation=(-1.66157 -0.186644 0)
          translation=(0.01602741 -0.1232368 -0.02557332) quadrant=all radius=0.01805948 length=0.07661598
      WrapCylinder AL_at_femshaft_l: xyz_body_rotation=(-1.77711 -0.136489 0)
          translation=(0.03363737 -0.2538276 -0.01654216) quadrant=all radius=0.02199973 length=0.1094514
      WrapCylinder AMprox_at_femshaft_l: xyz_body_rotation=(-1.61126 -0.18656 0)
          translation=(0.005672855 -0.07978438 -0.02780394) quadrant=all radius=0.02309424 length=0.07661598
      WrapCylinder AMmid_at_femshaft_l: xyz_body_rotation=(-1.61139 -0.13656 0)
          translation=(0.0251875 -0.1759004 -0.02252969) quadrant=all radius=0.0234226 length=0.1313417
      WrapCylinder AMdist_at_femshaft_l: xyz_body_rotation=(-1.71188 -0.186636 0)
          translation=(0.03459376 -0.2853792 -0.01024969) quadrant=all radius=0.0238604 length=0.2189028
      WrapCylinder AMisch_at_condyles_l: xyz_body_rotation=(-1.71115 0.463363 0)
          translation=(-0.02479195 -0.4124468 0.003452502) quadrant=all radius=0.04378056 length=0.2626834
      WrapCylinder PECT_at_femshaft_l: xyz_body_rotation=(-1.81295 -0.276344 0)
          translation=(0.006660916 -0.0924896 -0.03331755) quadrant=all radius=0.01641771 length=0.0547257
    Body tibia_l: mass=5.424605 mass_center=(0 -0.2116575 0) inertia=(0.09477555 0.009590383 0.09609188 0 0 0)
        meshes=(l_tibia.vtp l_fibula.vtp)
      WrapCylinder GasLat_at_shank_l: xyz_body_rotation=(-2.96723 0.279725 -1.47812)
          translation=(-0.008389211 -0.08389211 0.003741135) quadrant=-y radius=0.06235225 length=0.1133677
      WrapCylinder GasMed_at_shank_l: xyz_body_rotation=(-2.96723 -0.0279725 -1.47812)
          translation=(-0.008389211 -0.08389211 0.003741135) quadrant=-y radius=0.06235225 length=0.1133677
      WrapCylinder GR_at_condyles_l: xyz_body_rotation=(0 0.4 0) translation=(-0.003401032 -0.02267354 0) quadrant=all
          radius=0.04081238 length=0.1133677
      WrapCylinder SM_at_condyles_l: xyz_body_rotation=(0 0.1 0) translation=(-0.001133677 -0.02267354 0) quadrant=all
          radius=0.03990544 length=0.1133677
      WrapCylinder ST_at_condyles_l: xyz_body_rotation=(0 0.2 0) translation=(-0.002267354 -0.02324038 0) quadrant=all
          radius=0.04818128 length=0.1133677
      WrapCylinder BF_at_gastroc_l: translation=(-0.06575328 -0.06802063 0) quadrant=all radius=0.03401032
          length=0.1700516
    Body patella_l: mass=0.1134984 mass_center=(0.001970125 0.02889517 0)
        inertia=(4.526965e-6 2.067892e-5 2.067892e-5 0 0 0) meshes=l_patella.vtp
    Body talus_l: mass=0.1463144 mass_center=(0 0 0) inertia=(0.001880467 0.001880467 0.001880467 0 0 0)
        meshes=l_talus.vtp
    Body calcn_l: mass=1.34206 mass_center=(0.1022542 0.03067625 0) inertia=(0.001571637 0.004378131 0.00460265 0 0 0)
        meshes=l_foot.vtp
    Body toes_l: mass=0.2325522 mass_center=(0.03537995 0.006135251 0.01789448)
        inertia=(0.0001122598 0.0002245195 0.001122598 0 0 0) meshes=l_bofoot.vtp
    Body torso: mass=18.44628 mass_center=(-0.02661451 0.2784068 0) inertia=(2.008748 1.029237 1.950032 0 0 0)
        meshes=(hat_spine.vtp hat_jaw.vtp hat_skull.vtp hat_ribs_scap.vtp)
    Body humerus_r: mass=1.714394 mass_center=(0 -0.1810576 0) inertia=(0.01627433 0.005614141 0.01826742 0 0 0)
        meshes=humerus_rv.vtp
    Body ulna_r: mass=0.4840405 mass_center=(0 -0.1253078 0) inertia=(0.004035207 0.0008419169 0.00437715 0 0 0)
        meshes=ulna_rv.vtp
    Body radius_r: mass=0.4840405 mass_center=(0 -0.1253078 0) inertia=(0.004035207 0.0008419169 0.00437715 0 0 0)
        meshes=radius_rv.vtp
    Body hand_r: mass=0.3645244 mass_center=(0 -0.07079724 0) inertia=(0.001215194 0.0007451918 0.001825516 0 0 0)
        meshes=(pisiform_rvs.vtp lunate_rvs.vtp scaphoid_rvs.vtp triquetrum_rvs.vtp hamate_rvs.vtp capitate_rvs.vtp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)
    Body humerus_l: mass=1.714394 mass_center=(0 -0.1810576 0) inertia=(0.01627433 0.005614141 0.01826742 0 0 0)
        meshes=humerus_lv.vtp
    Body ulna_l: mass=0.4840405 mass_center=(0 -0.1253078 0) inertia=(0.004035207 0.0008419169 0.00437715 0 0 0)
        meshes=ulna_lv.vtp
    Body radius_l: mass=0.4840405 mass_center=(0 -0.1253078 0) inertia=(0.004035207 0.0008419169 0.00437715 0 0 0)
        meshes=radius_lv.vtp
    Body hand_l: mass=0.3645244 mass_center=(0 -0.07079724 0) inertia=(0.001215194 0.0007451918 0.001825516 0 0 0)
        meshes=(pisiform_lvs.vtp lunate_lvs.vtp scaphoid_lvs.vtp triquetrum_lvs.vtp hamate_lvs.vtp capitate_lvs.vtp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)
  JointSet:
    CustomJoint ground_pelvis: socket_parent_frame=ground_offset socket_child_frame=pelvis_offset
      Coordinate pelvis_tilt: default_value=0.06580384 range=(-1.570796 1.570796) clamped=true locked=true
      Coordinate pelvis_list: default_value=-0.1582466 range=(-1.570796 1.570796) clamped=true locked=true
      Coordinate pelvis_rotation: default_value=0.06473568 range=(-1.570796 1.570796) clamped=true locked=true
      Coordinate pelvis_tx: default_value=0.04484839 range=(-5 5) clamped=true locked=true
      Coordinate pelvis_ty: default_value=1.011583 range=(-1 2) clamped=true locked=true
      Coordinate pelvis_tz: default_value=-0.2234001 range=(-3 3) clamped=true locked=true
      PhysicalOffsetFrame ground_offset: socket_parent=/ground translation=(0 0 0)
      PhysicalOffsetFrame pelvis_offset: socket_parent=/bodyset/pelvis translation=(0 0 0)
      SpatialTransform:
        TransformAxis rotation1: coordinates=pelvis_tilt axis=(0 0 1) LinearFunction(coefficients=1 0)
        TransformAxis rotation2: coordinates=pelvis_list axis=(1 0 0) LinearFunction(coefficients=1 0)
        TransformAxis rotation3: coordinates=pelvis_rotation axis=(0 1 0) LinearFunction(coefficients=1 0)
        TransformAxis translation1: coordinates=pelvis_tx axis=(1 0 0) LinearFunction(coefficients=1 0)
        TransformAxis translation2: coordinates=pelvis_ty axis=(0 1 0) LinearFunction(coefficients=1 0)
        TransformAxis translation3: coordinates=pelvis_tz axis=(0 0 1) LinearFunction(coefficients=1 0)
    CustomJoint hip_r: socket_parent_frame=pelvis_offset socket_child_frame=femur_r_offset
      Coordinate hip_flexion_r: default_value=0 range=(-0.5235988 2.094395) clamped=true
      Coordinate hip_adduction_r: default_value=0 range=(-0.8726646 0.5235988) clamped=true
      Coordinate hip_rotation_r: default_value=0 range=(-0.6981317 0.6981317) clamped=true
      PhysicalOffsetFrame pelvis_offset: socket_parent=/bodyset/pelvis translation=(-0.05869579 -0.07777171 0.08058207)
      PhysicalOffsetFrame femur_r_offset: socket_parent=/bodyset/femur_r translation=(0 0 0)
      SpatialTransform: axes_held_at_zero=(translation1 translation2 translation3)
        TransformAxis rotation1: coordinates=hip_flexion_r axis=(0 0 1) LinearFunction(coefficients=1 0)
        TransformAxis rotation2: coordinates=hip_adduction_r axis=(1 0 0) LinearFunction(coefficients=1 0)
        TransformAxis rotation3: coordinates=hip_rotation_r axis=(0 1 0) LinearFunction(coefficients=1 0)
    CustomJoint walker_knee_r: socket_parent_frame=femur_r_offset socket_child_frame=tibia_r_offset
      Coordinate knee_angle_r: default_value=0 range=(0 2.0944) clamped=true
      PhysicalOffsetFrame femur_r_offset: socket_parent=/bodyset/femur_r
          translation=(-0.008854618 -0.4465179 -0.003009913) orientation=(-1.64157 1.44618 1.5708) [radians]
      PhysicalOffsetFrame tibia_r_offset: socket_parent=/bodyset/tibia_r
          translation=(-0.009170927 -0.004007322 -0.001683216) orientation=(-1.64157 1.44618 1.5708)
      SpatialTransform: axes_held_at_zero=translation3
        TransformAxis rotation1: coordinates=knee_angle_r axis=(1 0 0) LinearFunction(coefficients=1 0)
        TransformAxis rotation2: coordinates=knee_angle_r axis=(0 0 1)
          SimmSpline: x=(0 0.174533 0.349066 0.523599 0.698132 0.872665 1.0472 1.22173 1.39626 1.5708 1.74533 1.91986 2.0944)
              y=(0 0.0126809 0.0226969 0.0296054 0.0332049 0.0335354 0.0308779 0.0257548 0.0189295 0.011407 0.00443314 -0.00050475 -0.0016782)
        TransformAxis rotation3: coordinates=knee_angle_r axis=(0 1 0)
          SimmSpline: x=(0 0.174533 0.349066 0.523599 0.698132 0.872665 1.0472 1.22173 1.39626 1.5708 1.74533 1.91986 2.0944)
              y=(0 0.059461 0.109399 0.150618 0.18392 0.210107 0.229983 0.24435 0.254012 0.25977 0.262428 0.262788 0.261654)
        TransformAxis translation1: coordinates=knee_angle_r axis=(0 1 0)
          MultiplierFunction: scale=1.094514
            SimmSpline: x=(0 0.174533 0.349066 0.523599 0.698132 0.872665 1.0472 1.22173 1.39626 1.5708 1.74533 1.91986 2.0944)
                y=(0 0.000479 0.000835 0.001086 0.001251 0.001346 0.001391 0.001403 0.0014 0.0014 0.001421 0.001481 0.001599)
        TransformAxis translation2: coordinates=knee_angle_r axis=(0 0 1)
          MultiplierFunction: scale=1.094514
            SimmSpline: x=(0 0.174533 0.349066 0.523599 0.698132 0.872665 1.0472 1.22173 1.39626 1.5708 1.74533 1.91986 2.0944)
                y=(0 0.000988 0.001899 0.002734 0.003492 0.004173 0.004777 0.005305 0.005756 0.00613 0.006427 0.006648 0.006792)
    CustomJoint patellofemoral_r: socket_parent_frame=femur_r_offset socket_child_frame=patella_r_offset
      Coordinate knee_angle_r_beta: default_value=0 range=(-99999.9 99999.9) clamped=false
      PhysicalOffsetFrame femur_r_offset: socket_parent=/bodyset/femur_r
          translation=(-0.008854618 -0.4465179 -0.003009913)
      PhysicalOffsetFrame patella_r_offset: socket_parent=/bodyset/patella_r translation=(0 0 0)
      SpatialTransform: axes_held_at_zero=(rotation2 rotation3)
        TransformAxis rotation1: coordinates=knee_angle_r_beta axis=(0 0 1)
          SimmSpline: x=(0 0.174533 0.349066 0.523599 0.698132 0.872665 1.0472 1.22173 1.39626 1.5708 1.74533 1.91986 2.0944)
              y=(0.00113686 -0.00629212 -0.105582 -0.253683 -0.414245 -0.579047 -0.747244 -0.91799 -1.09044 -1.26379 -1.43763 -1.61186 -1.78634)
        TransformAxis translation1: coordinates=knee_angle_r_beta axis=(1 0 0)
          MultiplierFunction: scale=1.094514
            SimmSpline: x=(0 0.174533 0.349066 0.523599 0.698132 0.872665 1.0472 1.22173 1.39626 1.5708 1.74533 1.91986 2.0944)
                y=(0.0524 0.0488 0.0437 0.0371 0.0296 0.0216 0.0136 0.0057 -0.0019 -0.0088 -0.0148 -0.0196 -0.0227)
        TransformAxis translation2: coordinates=knee_angle_r_beta axis=(0 1 0)
          MultiplierFunction: scale=1.094514
            SimmSpline: x=(0 0.174533 0.349066 0.523599 0.698132 0.872665 1.0472 1.22173 1.39626 1.5708 1.74533 1.91986 2.0944)
                y=(-0.0108 -0.019 -0.0263 -0.0322 -0.0367 -0.0395 -0.0408 -0.0404 -0.0384 -0.0349 -0.0301 -0.0245 -0.0187)
        TransformAxis translation3: axis=(0 0 1) MultiplierFunction(scale=1.094514, Constant(value=0.00275))
    PinJoint ankle_r: socket_parent_frame=tibia_r_offset socket_child_frame=talus_r_offset
      Coordinate ankle_angle_r: default_value=0 range=(-0.6981317 0.5235988) clamped=true
      PhysicalOffsetFrame tibia_r_offset: socket_parent=/bodyset/tibia_r translation=(-0.01133677 -0.4534709 0)
          orientation=(0.175895 -0.105208 0.0186622)
      PhysicalOffsetFrame talus_r_offset: socket_parent=/bodyset/talus_r translation=(0 0 0)
          orientation=(0.175895 -0.105208 0.0186622)
    PinJoint subtalar_r: socket_parent_frame=talus_r_offset socket_child_frame=calcn_r_offset
      Coordinate subtalar_angle_r: default_value=0 range=(-0.3490659 0.3490659) clamped=true locked=true
      PhysicalOffsetFrame talus_r_offset: socket_parent=/bodyset/talus_r
          translation=(-0.05528944 -0.04755776 0.008978723) orientation=(-1.76819 0.906223 1.8196)
      PhysicalOffsetFrame calcn_r_offset: socket_parent=/bodyset/calcn_r translation=(0 0 0)
          orientation=(-1.76819 0.906223 1.8196)
    PinJoint mtp_r: socket_parent_frame=calcn_r_offset socket_child_frame=toes_r_offset
      Coordinate mtp_angle_r: default_value=0 range=(-0.5235988 0.5235988) clamped=true locked=true
      PhysicalOffsetFrame calcn_r_offset: socket_parent=/bodyset/calcn_r
          translation=(0.1828305 -0.002045084 0.001104345) orientation=(-3.14159 0.619901 0)
      PhysicalOffsetFrame toes_r_offset: socket_parent=/bodyset/toes_r translation=(0 0 0)
          orientation=(-3.14159 0.619901 0)
    CustomJoint hip_l: socket_parent_frame=pelvis_offset socket_child_frame=femur_l_offset
      Coordinate hip_flexion_l: default_value=-0.08650476 range=(-0.5235988 2.094395) clamped=true locked=true
      Coordinate hip_adduction_l: default_value=-0.2899231 range=(-0.8726646 0.5235988) clamped=true locked=true
      Coordinate hip_rotation_l: default_value=-0.1472156 range=(-0.6981317 0.6981317) clamped=true locked=true
      PhysicalOffsetFrame pelvis_offset: socket_parent=/bodyset/pelvis
          translation=(-0.05869579 -0.07777171 -0.08058207)
      PhysicalOffsetFrame femur_l_offset: socket_parent=/bodyset/femur_l translation=(0 0 0)
      SpatialTransform: axes_held_at_zero=(translation1 translation2 translation3)
        TransformAxis rotation1: coordinates=hip_flexion_l axis=(0 0 1) LinearFunction(coefficients=1 0)
        TransformAxis rotation2: coordinates=hip_adduction_l axis=(1 0 0) LinearFunction(coefficients=-1 0)
        TransformAxis rotation3: coordinates=hip_rotation_l axis=(0 1 0) LinearFunction(coefficients=-1 0)
    CustomJoint walker_knee_l: socket_parent_frame=femur_l_offset socket_child_frame=tibia_l_offset
      Coordinate knee_angle_l: default_value=0.8892869 range=(0 2.0944) clamped=true locked=true
      PhysicalOffsetFrame femur_l_offset: socket_parent=/bodyset/femur_l
          translation=(-0.008854618 -0.4465179 0.003009913) orientation=(1.64157 -1.44618 1.5708)
      PhysicalOffsetFrame tibia_l_offset: socket_parent=/bodyset/tibia_l
          translation=(-0.009170927 -0.004007322 0.001683216) orientation=(1.64157 -1.44618 1.5708)
      SpatialTransform: axes_held_at_zero=translation3
        TransformAxis rotation1: coordinates=knee_angle_l axis=(-1 0 0) LinearFunction(coefficients=1 0)
        TransformAxis rotation2: coordinates=knee_angle_l axis=(0 0 1)
          SimmSpline: x=(0 0.174533 0.349066 0.523599 0.698132 0.872665 1.0472 1.22173 1.39626 1.5708 1.74533 1.91986 2.0944)
              y=(0 0.0126809 0.0226969 0.0296054 0.0332049 0.0335354 0.0308779 0.0257548 0.0189295 0.011407 0.00443314 -0.00050475 -0.0016782)
        TransformAxis rotation3: coordinates=knee_angle_l axis=(0 1 0)
          SimmSpline: x=(0 0.174533 0.349066 0.523599 0.698132 0.872665 1.0472 1.22173 1.39626 1.5708 1.74533 1.91986 2.0944)
              y=(0 -0.059461 -0.109399 -0.150618 -0.18392 -0.210107 -0.229983 -0.24435 -0.254012 -0.25977 -0.262428 -0.262788 -0.261654)
        TransformAxis translation1: coordinates=knee_angle_l axis=(0 1 0)
          MultiplierFunction: scale=1.094514
            SimmSpline: x=(0 0.174533 0.349066 0.523599 0.698132 0.872665 1.0472 1.22173 1.39626 1.5708 1.74533 1.91986 2.0944)
                y=(0 0.000479 0.000835 0.001086 0.001251 0.001346 0.001391 0.001403 0.0014 0.0014 0.001421 0.001481 0.001599)
        TransformAxis translation2: coordinates=knee_angle_l axis=(0 0 1)
          MultiplierFunction: scale=1.094514
            SimmSpline: x=(0 0.174533 0.349066 0.523599 0.698132 0.872665 1.0472 1.22173 1.39626 1.5708 1.74533 1.91986 2.0944)
                y=(0 -0.000988 -0.001899 -0.002734 -0.003492 -0.004173 -0.004777 -0.005305 -0.005756 -0.00613 -0.006427 -0.006648 -0.006792)
    CustomJoint patellofemoral_l: socket_parent_frame=femur_l_offset socket_child_frame=patella_l_offset
      Coordinate knee_angle_l_beta: default_value=0.8892869 range=(-99999.9 99999.9) clamped=false locked=true
      PhysicalOffsetFrame femur_l_offset: socket_parent=/bodyset/femur_l
          translation=(-0.008854618 -0.4465179 0.003009913)
      PhysicalOffsetFrame patella_l_offset: socket_parent=/bodyset/patella_l translation=(0 0 0)
      SpatialTransform: axes_held_at_zero=(rotation2 rotation3)
        TransformAxis rotation1: coordinates=knee_angle_l_beta axis=(0 0 1)
          SimmSpline: x=(0 0.174533 0.349066 0.523599 0.698132 0.872665 1.0472 1.22173 1.39626 1.5708 1.74533 1.91986 2.0944)
              y=(0.00113686 -0.00629212 -0.105582 -0.253683 -0.414245 -0.579047 -0.747244 -0.91799 -1.09044 -1.26379 -1.43763 -1.61186 -1.78634)
        TransformAxis translation1: coordinates=knee_angle_l_beta axis=(1 0 0)
          MultiplierFunction: scale=1.094514
            SimmSpline: x=(0 0.174533 0.349066 0.523599 0.698132 0.872665 1.0472 1.22173 1.39626 1.5708 1.74533 1.91986 2.0944)
                y=(0.0524 0.0488 0.0437 0.0371 0.0296 0.0216 0.0136 0.0057 -0.0019 -0.0088 -0.0148 -0.0196 -0.0227)
        TransformAxis translation2: coordinates=knee_angle_l_beta axis=(0 1 0)
          MultiplierFunction: scale=1.094514
            SimmSpline: x=(0 0.174533 0.349066 0.523599 0.698132 0.872665 1.0472 1.22173 1.39626 1.5708 1.74533 1.91986 2.0944)
                y=(-0.0108 -0.019 -0.0263 -0.0322 -0.0367 -0.0395 -0.0408 -0.0404 -0.0384 -0.0349 -0.0301 -0.0245 -0.0187)
        TransformAxis translation3: axis=(0 0 1) MultiplierFunction(scale=1.094514, Constant(value=-0.00275))
    PinJoint ankle_l: socket_parent_frame=tibia_l_offset socket_child_frame=talus_l_offset
      Coordinate ankle_angle_l: default_value=-0.3299034 range=(-0.6981317 0.5235988) clamped=true locked=true
      PhysicalOffsetFrame tibia_l_offset: socket_parent=/bodyset/tibia_l translation=(-0.01133677 -0.4534709 0)
          orientation=(-0.175895 0.105208 0.0186622)
      PhysicalOffsetFrame talus_l_offset: socket_parent=/bodyset/talus_l translation=(0 0 0)
          orientation=(-0.175895 0.105208 0.0186622)
    PinJoint subtalar_l: socket_parent_frame=talus_l_offset socket_child_frame=calcn_l_offset
      Coordinate subtalar_angle_l: default_value=0 range=(-0.3490659 0.3490659) clamped=true locked=true
      PhysicalOffsetFrame talus_l_offset: socket_parent=/bodyset/talus_l
          translation=(-0.05528944 -0.04755776 -0.008978723) orientation=(1.76819 -0.906223 1.8196)
      PhysicalOffsetFrame calcn_l_offset: socket_parent=/bodyset/calcn_l translation=(0 0 0)
          orientation=(1.76819 -0.906223 1.8196)
    PinJoint mtp_l: socket_parent_frame=calcn_l_offset socket_child_frame=toes_l_offset
      Coordinate mtp_angle_l: default_value=0 range=(-0.5235988 0.5235988) clamped=true locked=true
      PhysicalOffsetFrame calcn_l_offset: socket_parent=/bodyset/calcn_l
          translation=(0.1828305 -0.002045084 -0.001104345) orientation=(-3.14159 -0.619901 0)
      PhysicalOffsetFrame toes_l_offset: socket_parent=/bodyset/toes_l translation=(0 0 0)
          orientation=(-3.14159 -0.619901 0)
    CustomJoint back: socket_parent_frame=pelvis_offset socket_child_frame=torso_offset
      Coordinate lumbar_extension: default_value=-0.1635882 range=(-1.570796 1.570796) clamped=true locked=true
      Coordinate lumbar_bending: default_value=0.1907444 range=(-1.570796 1.570796) clamped=true locked=true
      Coordinate lumbar_rotation: default_value=-0.06833808 range=(-1.570796 1.570796) clamped=true locked=true
      PhysicalOffsetFrame pelvis_offset: socket_parent=/bodyset/pelvis translation=(-0.10503 0.08075417 0)
      PhysicalOffsetFrame torso_offset: socket_parent=/bodyset/torso translation=(0 0 0)
      SpatialTransform: axes_held_at_zero=(translation1 translation2 translation3)
        TransformAxis rotation1: coordinates=lumbar_extension axis=(0 0 1) LinearFunction(coefficients=1 0)
        TransformAxis rotation2: coordinates=lumbar_bending axis=(1 0 0) LinearFunction(coefficients=1 0)
        TransformAxis rotation3: coordinates=lumbar_rotation axis=(0 1 0) LinearFunction(coefficients=1 0)
    CustomJoint acromial_r: socket_parent_frame=torso_offset socket_child_frame=humerus_r_offset
      Coordinate arm_flex_r: default_value=-0.1771482 range=(-1.570796 1.570796) clamped=true locked=true
      Coordinate arm_add_r: default_value=-0.1930281 range=(-2.094395 1.570796) clamped=true locked=true
      Coordinate arm_rot_r: default_value=-0.2440217 range=(-1.570796 1.570796) clamped=true locked=true
      PhysicalOffsetFrame torso_offset: socket_parent=/bodyset/torso translation=(0.00279896 0.3232129 0.1508156)
      PhysicalOffsetFrame humerus_r_offset: socket_parent=/bodyset/humerus_r translation=(0 0 0)
      SpatialTransform: axes_held_at_zero=(translation1 translation2 translation3)
        TransformAxis rotation1: coordinates=arm_flex_r axis=(0 0 1) LinearFunction(coefficients=1 0)
        TransformAxis rotation2: coordinates=arm_add_r axis=(1 0 0) LinearFunction(coefficients=1 0)
        TransformAxis rotation3: coordinates=arm_rot_r axis=(0 1 0) LinearFunction(coefficients=1 0)
    PinJoint elbow_r: socket_parent_frame=humerus_r_offset socket_child_frame=ulna_r_offset
      Coordinate elbow_flex_r: default_value=0.5223158 range=(0 2.618) clamped=true locked=true
      PhysicalOffsetFrame humerus_r_offset: socket_parent=/bodyset/humerus_r
          translation=(0.01148247 -0.3150838 -0.0083821) orientation=(-0.0228627 0.228018 0.0051689)
      PhysicalOffsetFrame ulna_r_offset: socket_parent=/bodyset/ulna_r translation=(0 0 0)
          orientation=(-0.0228627 0.228018 0.0051689)
    PinJoint radioulnar_r: socket_parent_frame=ulna_r_offset socket_child_frame=radius_r_offset
      Coordinate pro_sup_r: default_value=0.5368348 range=(0 1.570796) clamped=true locked=true
      PhysicalOffsetFrame ulna_r_offset: socket_parent=/bodyset/ulna_r
          translation=(-0.005876642 -0.01352316 0.02278586) orientation=(-1.56884 0.056428 1.53614)
      PhysicalOffsetFrame radius_r_offset: socket_parent=/bodyset/radius_r translation=(0 0 0)
          orientation=(-1.56884 0.056428 1.53614)
    UniversalJoint radius_hand_r: socket_parent_frame=radius_r_offset socket_child_frame=hand_r_offset
      Coordinate wrist_flex_r: default_value=0 range=(-1.22173 1.22173) clamped=true locked=true
      Coordinate wrist_dev_r: default_value=0 range=(-0.4363323 0.6108652) clamped=true locked=true
      PhysicalOffsetFrame radius_r_offset: socket_parent=/bodyset/radius_r
          translation=(-0.007684974 -0.2452 0.01188956) orientation=(-1.5708 0 -1.5708)
      PhysicalOffsetFrame hand_r_offset: socket_parent=/bodyset/hand_r translation=(0 0 0)
          orientation=(-1.5708 0 -1.5708)
    CustomJoint acromial_l: socket_parent_frame=torso_offset socket_child_frame=humerus_l_offset
      Coordinate arm_flex_l: default_value=-0.00240268 range=(-1.570796 1.570796) clamped=true locked=true
      Coordinate arm_add_l: default_value=-0.1724199 range=(-2.094395 1.570796) clamped=true locked=true
      Coordinate arm_rot_l: default_value=-0.2260006 range=(-1.570796 1.570796) clamped=true locked=true
      PhysicalOffsetFrame torso_offset: socket_parent=/bodyset/torso translation=(0.00279896 0.3232129 -0.1508156)
      PhysicalOffsetFrame humerus_l_offset: socket_parent=/bodyset/humerus_l translation=(0 0 0)
      SpatialTransform: axes_held_at_zero=(translation1 translation2 translation3)
        TransformAxis rotation1: coordinates=arm_flex_l axis=(0 0 1) LinearFunction(coefficients=1 0)
        TransformAxis rotation2: coordinates=arm_add_l axis=(-1 0 0) LinearFunction(coefficients=1 0)
        TransformAxis rotation3: coordinates=arm_rot_l axis=(0 -1 0) LinearFunction(coefficients=1 0)
    PinJoint elbow_l: socket_parent_frame=humerus_l_offset socket_child_frame=ulna_l_offset
      Coordinate elbow_flex_l: default_value=0.5354184 range=(0 2.618) clamped=true locked=true
      PhysicalOffsetFrame humerus_l_offset: socket_parent=/bodyset/humerus_l
          translation=(0.01148247 -0.3150838 0.0083821) orientation=(0.0228627 -0.228018 0.0051689)
      PhysicalOffsetFrame ulna_l_offset: socket_parent=/bodyset/ulna_l translation=(0 0 0)
          orientation=(0.0228627 -0.228018 0.0051689)
    PinJoint radioulnar_l: socket_parent_frame=ulna_l_offset socket_child_frame=radius_l_offset
      Coordinate pro_sup_l: default_value=0.5289997 range=(0 1.570796) clamped=true locked=true
      PhysicalOffsetFrame ulna_l_offset: socket_parent=/bodyset/ulna_l
          translation=(-0.005876642 -0.01352316 -0.02278586) orientation=(1.56884 -0.056428 1.53614)
      PhysicalOffsetFrame radius_l_offset: socket_parent=/bodyset/radius_l translation=(0 0 0)
          orientation=(1.56884 -0.056428 1.53614)
    UniversalJoint radius_hand_l: socket_parent_frame=radius_l_offset socket_child_frame=hand_l_offset
      Coordinate wrist_flex_l: default_value=0 range=(-1.22173 1.22173) clamped=true locked=true
      Coordinate wrist_dev_l: default_value=0 range=(-0.4363323 0.6108652) clamped=true locked=true
      PhysicalOffsetFrame radius_l_offset: socket_parent=/bodyset/radius_l
          translation=(-0.007684974 -0.2452 -0.01188956) orientation=(1.5708 0 1.5708)
      PhysicalOffsetFrame hand_l_offset: socket_parent=/bodyset/hand_l translation=(0 0 0)
          orientation=(1.5708 0 1.5708)
  ControllerSet:
    ControlSetController: actuator_list=(addbrev_r addlong_r addmagDist_r addmagIsch_r addmagMid_r addmagProx_r bflh_r bfsh_r edl_r ehl_r fdl_r fhl_r gaslat_r gasmed_r glmax1_r glmax2_r glmax3_r glmed1_r glmed2_r glmed3_r glmin1_r glmin2_r glmin3_r grac_r iliacus_r perbrev_r perlong_r piri_r psoas_r recfem_r sart_r semimem_r semiten_r soleus_r tfl_r tibant_r tibpost_r vasint_r vaslat_r vasmed_r addbrev_l addlong_l addmagDist_l addmagIsch_l addmagMid_l addmagProx_l bflh_l bfsh_l edl_l ehl_l fdl_l fhl_l gaslat_l gasmed_l glmax1_l glmax2_l glmax3_l glmed1_l glmed2_l glmed3_l glmin1_l glmin2_l glmin3_l grac_l iliacus_l perbrev_l perlong_l piri_l psoas_l recfem_l sart_l semimem_l semiten_l soleus_l tfl_l tibant_l tibpost_l vasint_l vaslat_l vasmed_l lumbar_ext lumbar_bend lumbar_rot shoulder_flex_r shoulder_add_r shoulder_rot_r elbow_flex_r pro_sup_r wrist_flex_r wrist_dev_r shoulder_flex_l shoulder_add_l shoulder_rot_l elbow_flex_l pro_sup_l wrist_flex_l wrist_dev_l FX FY FZ MX MY MZ hip_flexion_r_reserve hip_adduction_r_reserve hip_rotation_r_reserve knee_angle_r_reserve ankle_angle_r_reserve hip_flexion_l_reserve hip_adduction_l_reserve hip_rotation_l_reserve knee_angle_l_reserve ankle_angle_l_reserve)
  ConstraintSet:
    PointOnLineConstraint PoL: socket_line_body=/bodyset/pelvis socket_follower_body=/bodyset/calcn_r
        line_direction_vec=(-0.0509885 0.9906347 -0.0882341) point_on_line=(0 0 0) point_on_follower=(0 0 0)
    CoordinateCouplerConstraint patellofemoral_knee_angle_r_con: independent_coordinate_names=knee_angle_r
        dependent_coordinate_name=knee_angle_r_beta scale_factor=1
        coupled_coordinates_function=LinearFunction(coefficients=1 0)
    CoordinateCouplerConstraint patellofemoral_knee_angle_l_con: independent_coordinate_names=knee_angle_l
        dependent_coordinate_name=knee_angle_l_beta scale_factor=1
        coupled_coordinates_function=LinearFunction(coefficients=1 0)
  ForceSet:
    Millard2012EquilibriumMuscle [values shared by the 80 below unless stated]: pennation_angle_at_optimal=0 [radians]
        fiber_damping=0.01 default_activation=0.01 minimum_activation=0.01
      ActiveForceLengthCurve: min_norm_active_fiber_length=0.25 transition_norm_fiber_length=0.77
          max_norm_active_fiber_length=1.9 shallow_ascending_slope=0.75 minimum_value=0
      ForceVelocityCurve: concentric_slope_at_vmax=0 concentric_slope_near_vmax=0.25 isometric_slope=5
          eccentric_slope_at_vmax=0 eccentric_slope_near_vmax=0.15 max_eccentric_velocity_force_multiplier=1.4
      FiberForceLengthCurve: strain_at_zero_force=0 strain_at_one_norm_force=0.7
      TendonForceLengthCurve
    Millard2012EquilibriumMuscle addbrev_r: max_isometric_force=625.8197 optimal_fiber_length=0.111897
        tendon_slack_length=0.03847508 ignore_tendon_compliance=true
      PointBasedPath geometrypath:
        PathPoint addbrev_r-P1: pelvis (-0.01992127 -0.09313978 0.01606218)
        PathPoint addbrev_r-P2: femur_r (-0.002189028 -0.1291526 0.0272534)
        PathWrap: wrap_object=AB_at_femshaft_r method=hybrid
    Millard2012EquilibriumMuscle addlong_r: max_isometric_force=916.8 optimal_fiber_length=0.1183044
        tendon_slack_length=0.1441076
      PointBasedPath geometrypath:
        PathPoint addlong_r-P1: pelvis (-0.00790593 -0.08808645 0.01969181)
        PathPoint addlong_r-P2: femur_r (0.01232423 -0.2619938 0.01732616)
        PathWrap: wrap_object=AL_at_femshaft_r method=hybrid
    Millard2012EquilibriumMuscle addmagDist_r: max_isometric_force=597.2951 optimal_fiber_length=0.1973877
        tendon_slack_length=0.09733563 ignore_tendon_compliance=true
      PointBasedPath geometrypath:
        PathPoint addmagDist_r-P1: pelvis (-0.07722362 -0.1265017 0.04153221)
        PathPoint addmagDist_r-P2: femur_r (0.01231328 -0.2873099 0.02112412)
        PathWrap: wrap_object=AMdist_at_femshaft_r method=hybrid
    Millard2012EquilibriumMuscle addmagIsch_r: max_isometric_force=597.2951 optimal_fiber_length=0.1733116
        tendon_slack_length=0.2400432
      PointBasedPath geometrypath:
        PathPoint addmagIsch_r-P1: pelvis (-0.09347354 -0.1285725 0.04350347)
        PathPoint addmagIsch_r-P2: femur_r (0.005264612 -0.4246386 -0.03582344)
        PathWrap: wrap_object=AMisch_at_condyles_r method=hybrid
    Millard2012EquilibriumMuscle addmagMid_r: max_isometric_force=597.2951 optimal_fiber_length=0.1530011
        tendon_slack_length=0.05180894 ignore_tendon_compliance=true
      PointBasedPath geometrypath:
        PathPoint addmagMid_r-P1: pelvis (-0.05492431 -0.119645 0.02976718)
        PathPoint addmagMid_r-P2: femur_r (0.002648724 -0.1777491 0.0319817)
        PathWrap: wrap_object=AMmid_at_femshaft_r method=hybrid
    Millard2012EquilibriumMuscle addmagProx_r: max_isometric_force=597.2951 optimal_fiber_length=0.1139718
        tendon_slack_length=0.04352092 ignore_tendon_compliance=true
      PointBasedPath geometrypath:
        PathPoint addmagProx_r-P1: pelvis (-0.0323121 -0.1065658 0.01423693)
        PathPoint addmagProx_r-P2: femur_r (-0.01671323 -0.08631337 0.03504634)
        PathWrap: wrap_object=AMprox_at_femshaft_r method=hybrid
    Millard2012EquilibriumMuscle bflh_r: max_isometric_force=1313.184 optimal_fiber_length=0.1081936
        tendon_slack_length=0.3605272
      PointBasedPath geometrypath:
        PathPoint bflh_r-P1: pelvis (-0.1084719 -0.1180101 0.06111972)
        PathPoint bflh_r-P2: tibia_r (-0.03820492 -0.0396787 0.02868203)
        PathPoint bflh_r-P3: tibia_r (-0.03253654 -0.05158231 0.03435042)
    Millard2012EquilibriumMuscle bfsh_r: max_isometric_force=557.1148 optimal_fiber_length=0.1214923
        tendon_slack_length=0.1165546 ignore_tendon_compliance=true
      PointBasedPath geometrypath:
        PathPoint bfsh_r-P1: femur_r (0.00547257 -0.2310519 0.02561163)
        PathPoint bfsh_r-P2: tibia_r (-0.03412368 -0.04750108 0.03605094)
        PathWrap: wrap_object=BF_at_gastroc_r method=hybrid
    Millard2012EquilibriumMuscle edl_r: max_isometric_force=603.4982 optimal_fiber_length=0.07610082
        tendon_slack_length=0.4050751
      PointBasedPath geometrypath:
        PathPoint edl_r-P1: tibia_r (-0.01813884 -0.1311665 0.02324038)
        PathPoint edl_r-P2: tibia_r (0.01859231 -0.4262626 0.01269718)
        PathPoint edl_r-P3: calcn_r (0.09397159 0.03681151 0.0008180335)
        PathPoint edl_r-P4: calcn_r (0.1652428 0.00562398 0.01329304)
        PathPoint edl_r-P5: toes_r (0.0003067625 0.004805947 0.01564489)
        PathPoint edl_r-P6: toes_r (0.0452986 -0.0004090167 0.02556355)
    Millard2012EquilibriumMuscle ehl_r: max_isometric_force=285.8675 optimal_fiber_length=0.08174854
        tendon_slack_length=0.3571529
      PointBasedPath geometrypath:
        PathPoint ehl_r-P1: tibia_r (-0.01587148 -0.17572 0.0214265)
        PathPoint ehl_r-P2: tibia_r (0.008049108 -0.3297867 0.01859231)
        PathPoint ehl_r-P3: tibia_r (0.02267354 -0.418667 -0.003174296)
        PathPoint ehl_r-P4: calcn_r (0.09918656 0.03977688 -0.02157563)
        PathPoint ehl_r-P5: calcn_r (0.1322147 0.03159654 -0.02627933)
        PathPoint ehl_r-P6: calcn_r (0.1773088 0.01421333 -0.02863117)
        PathPoint ehl_r-P7: toes_r (0.03047175 0.004192422 -0.02505227)
        PathPoint ehl_r-P8: toes_r (0.05756911 0.003476642 -0.01901928)
    Millard2012EquilibriumMuscle fdl_r: max_isometric_force=423.177 optimal_fiber_length=0.04859985
        tendon_slack_length=0.4127422
      PointBasedPath geometrypath:
        PathPoint fdl_r-P1: tibia_r (-0.002607458 -0.2076897 -0.002040619)
        PathPoint fdl_r-P2: tibia_r (-0.01995272 -0.4132253 -0.0140576)
        PathPoint fdl_r-P3: calcn_r (0.04458282 0.03221007 -0.02863117)
        PathPoint fdl_r-P4: calcn_r (0.07239596 0.01799674 -0.02689285)
        PathPoint fdl_r-P5: calcn_r (0.1695374 -0.008282589 0.01186149)
        PathPoint fdl_r-P6: toes_r (-0.001942829 -0.007975826 0.01503136)
        PathPoint fdl_r-P7: toes_r (0.02914244 -0.007260047 0.02198465)
        PathPoint fdl_r-P8: toes_r (0.04509409 -0.006135251 0.02474551)
    Millard2012EquilibriumMuscle fhl_r: max_isometric_force=907.8393 optimal_fiber_length=0.05713571
        tendon_slack_length=0.3841641
      PointBasedPath geometrypath:
        PathPoint fhl_r-P1: tibia_r (-0.03514399 -0.2452144 0.02267354)
        PathPoint fhl_r-P2: tibia_r (-0.02743499 -0.4161729 -0.008615947)
        PathPoint fhl_r-P3: calcn_r (0.03824306 0.02822215 -0.02464326)
        PathPoint fhl_r-P4: calcn_r (0.1061398 0.006953284 -0.02617707)
        PathPoint fhl_r-P5: calcn_r (0.1764907 -0.005419472 -0.02750638)
        PathPoint fhl_r-P6: toes_r (0.0158494 -0.006544268 -0.02709736)
        PathPoint fhl_r-P7: toes_r (0.05746685 -0.01042993 -0.01850801)
    Millard2012EquilibriumMuscle gaslat_r: max_isometric_force=1575.059 optimal_fiber_length=0.06701207
        tendon_slack_length=0.4285926
      PointBasedPath geometrypath:
        PathPoint gaslat_r-P1: femur_r (-0.003283542 -0.4174476 0.03031804)
        PathPoint gaslat_r-P2: calcn_r (0.004499184 0.0316988 -0.005419472)
        PathWrap shank: wrap_object=GasLat_at_shank_r method=hybrid
        PathWrap condyles: wrap_object=Gastroc_at_condyles_r method=hybrid
    Millard2012EquilibriumMuscle gasmed_r: max_isometric_force=3115.515 optimal_fiber_length=0.05808278
        tendon_slack_length=0.4540893
      PointBasedPath geometrypath:
        PathPoint gasmed_r-P1: femur_r (0.008756112 -0.4146019 -0.02276589)
        PathPoint gasmed_r-P2: calcn_r (0.004499184 0.0316988 -0.005419472)
        PathWrap shank: wrap_object=GasMed_at_shank_r method=hybrid
        PathWrap condyles: wrap_object=Gastroc_at_condyles_r method=hybrid
    Millard2012EquilibriumMuscle glmax1_r: max_isometric_force=983.7836 optimal_fiber_length=0.1515889
        tendon_slack_length=0.05036555 ignore_tendon_compliance=true
      PointBasedPath geometrypath:
        PathPoint glmax1_r-P1: pelvis (-0.1283931 0.03418428 0.05872082)
        PathPoint glmax1_r-P2: pelvis (-0.1311049 -0.02397854 0.08124959)
        PathPoint glmax1_r-P3: femur_r (-0.04859642 -0.03568116 0.03305432)
        PathPoint glmax1_r-P4: femur_r (-0.03031804 -0.06194949 0.05144216)
        PathWrap: wrap_object=Gmax1_at_pelvis_r method=hybrid
    Millard2012EquilibriumMuscle glmax2_r: max_isometric_force=1406.046 optimal_fiber_length=0.164426
        tendon_slack_length=0.07109819 ignore_tendon_compliance=true
      PointBasedPath geometrypath:
        PathPoint glmax2_r-P1: pelvis (-0.1373629 0.008620384 0.04818654)
        PathPoint glmax2_r-P2: pelvis (-0.140179 -0.06034269 0.08479579)
        PathPoint glmax2_r-P3: femur_r (-0.04925313 -0.06391962 0.02758175)
        PathPoint glmax2_r-P4: femur_r (-0.01707442 -0.1112026 0.04586013)
        PathWrap: wrap_object=Gmax2_at_pelvis_r method=hybrid
    Millard2012EquilibriumMuscle glmax3_r: max_isometric_force=947.7541 optimal_fiber_length=0.1778495
        tendon_slack_length=0.0742459 ignore_tendon_compliance=true
      PointBasedPath geometrypath:
        PathPoint glmax3_r-P1: pelvis (-0.1355898 -0.05201956 0.009386988)
        PathPoint glmax3_r-P2: pelvis (-0.1327737 -0.1251442 0.04537044)
        PathPoint glmax3_r-P3: femur_r (-0.03075584 -0.1231328 0.01028843)
        PathPoint glmax3_r-P4: femur_r (-0.006567084 -0.1553115 0.04498452)
        PathWrap: wrap_object=Gmax3_at_pelvis_r method=hybrid
    Millard2012EquilibriumMuscle glmed1_r: max_isometric_force=1093.467 optimal_fiber_length=0.07384628
        tendon_slack_length=0.05646391 ignore_tendon_compliance=true
      PointBasedPath geometrypath:
        PathPoint glmed1_r-P1: pelvis (-0.04641344 0.02427579 0.1222394)
        PathPoint glmed1_r-P2: femur_r (-0.0238604 -0.01280581 0.06074552)
    Millard2012EquilibriumMuscle glmed2_r: max_isometric_force=765.0917 optimal_fiber_length=0.0742356
        tendon_slack_length=0.06635321 ignore_tendon_compliance=true
      PointBasedPath geometrypath:
        PathPoint glmed2_r-P1: pelvis (-0.08865488 0.03131082 0.07040241)
        PathPoint glmed2_r-P2: femur_r (-0.02823846 -0.006348181 0.05768089)
    Millard2012EquilibriumMuscle glmed3_r: max_isometric_force=871.1993 optimal_fiber_length=0.07558577
        tendon_slack_length=0.04683506 ignore_tendon_compliance=true
      PointBasedPath geometrypath:
        PathPoint glmed3_r-P1: pelvis (-0.1201534 -0.007233195 0.05486173)
        PathPoint glmed3_r-P2: femur_r (-0.03382048 -0.005144216 0.05669582)
    Millard2012EquilibriumMuscle glmin1_r: max_isometric_force=374.0459 optimal_fiber_length=0.06980625
        tendon_slack_length=0.01656644 ignore_tendon_compliance=true
      PointBasedPath geometrypath:
        PathPoint glmin1_r-P1: pelvis (-0.04839514 -0.01476365 0.1086805)
        PathPoint glmin1_r-P2: femur_r (-0.007880501 -0.01138295 0.06129278)
    Millard2012EquilibriumMuscle glmin2_r: max_isometric_force=394.8197 optimal_fiber_length=0.05762357
        tendon_slack_length=0.02685572 ignore_tendon_compliance=true
      PointBasedPath geometrypath:
        PathPoint glmin2_r-P1: pelvis (-0.06424872 -0.01407005 0.1012752)
        PathPoint glmin2_r-P2: femur_r (-0.01050733 -0.01138295 0.06129278)
    Millard2012EquilibriumMuscle glmin3_r: max_isometric_force=446.7738 optimal_fiber_length=0.03937675
        tendon_slack_length=0.05271563
      PointBasedPath geometrypath:
        PathPoint glmin3_r-P1: pelvis (-0.08229259 -0.01535815 0.08323129)
        PathPoint glmin3_r-P2: femur_r (-0.01477594 -0.009084466 0.06019827)
    Millard2012EquilibriumMuscle grac_r: max_isometric_force=281.3115 optimal_fiber_length=0.253602
        tendon_slack_length=0.1914971 ignore_tendon_compliance=true
      PointBasedPath geometrypath:
        PathPoint grac_r-P1: pelvis (-0.04939641 -0.1281366 0.02561605)
        PathPoint grac_r-P2: tibia_r (-0.02088233 -0.05390635 -0.03356818)
        PathPoint grac_r-P3: tibia_r (0.002017945 -0.07892661 -0.01783274)
        PathWrap: wrap_object=GR_at_condyles_r method=hybrid
    Millard2012EquilibriumMuscle iliacus_r: max_isometric_force=1021.141 optimal_fiber_length=0.1098952
        tendon_slack_length=0.09909193 ignore_tendon_compliance=true
      PointBasedPath geometrypath:
        PathPoint iliacus_r-P1: pelvis (-0.06310142 0.03061722 0.08792478)
        PathPoint iliacus_r-P2: pelvis (-0.01408048 -0.05519027 0.0788507)
        PathPoint iliacus_r-P3: femur_r (-0.002517382 -0.06184004 0.01521374)
        PathPoint iliacus_r-P4: femur_r (-0.01335307 -0.06972054 0.02145247)
        PathWrap: wrap_object=IL_at_brim_r method=hybrid range=(2 3)
    Millard2012EquilibriumMuscle perbrev_r: max_isometric_force=521.2016 optimal_fiber_length=0.0504315
        tendon_slack_length=0.1638774
      PointBasedPath geometrypath:
        PathPoint perbrev_r-P1: tibia_r (-0.02754836 -0.2870471 0.0284553)
        PathPoint perbrev_r-P2: tibia_r (-0.03843166 -0.4413405 0.02822856)
        PathPoint perbrev_r-P3: tibia_r (-0.0323098 -0.4539244 0.02890877)
        PathPoint perbrev_r-P4: calcn_r (0.04816172 0.02760863 0.02382522)
        PathPoint perbrev_r-P5: calcn_r (0.06922608 0.02239367 0.03507318)
    Millard2012EquilibriumMuscle perlong_r: max_isometric_force=1115.371 optimal_fiber_length=0.05606992
        tendon_slack_length=0.3666849
      PointBasedPath geometrypath:
        PathPoint perlong_r-P1: tibia_r (-0.02267354 -0.1556539 0.0319697)
        PathPoint perlong_r-P2: tibia_r (-0.03593757 -0.4421341 0.02686815)
        PathPoint perlong_r-P3: tibia_r (-0.03083602 -0.455058 0.02720825)
        PathPoint perlong_r-P4: calcn_r (0.04478733 0.02351846 0.02259817)
        PathPoint perlong_r-P5: calcn_r (0.0696351 0.01083894 0.02904019)
        PathPoint perlong_r-P6: calcn_r (0.08712056 0.007055539 0.01206599)
        PathPoint perlong_r-P7: calcn_r (0.1230118 0.008691606 -0.01881477)
    Millard2012EquilibriumMuscle piri_r: max_isometric_force=1029.787 optimal_fiber_length=0.02700842
        tendon_slack_length=0.1193629
      PointBasedPath geometrypath:
        PathPoint piri_r-P1: pelvis (-0.1061877 -0.006470242 0.01409091)
        PathPoint piri_r-P2: pelvis (-0.1064067 -0.03037942 0.06353948)
        PathPoint piri_r-P3: femur_r (-0.01619881 -0.00394025 0.04783026)
    Millard2012EquilibriumMuscle psoas_r: max_isometric_force=1426.79 optimal_fiber_length=0.1197608
        tendon_slack_length=0.1019792 ignore_tendon_compliance=true
      PointBasedPath geometrypath:
        PathPoint psoas_r-P1: pelvis (-0.06320572 0.06143262 0.04067695)
        PathPoint psoas_r-P2: pelvis (-0.02138147 -0.0648015 0.06842071)
        PathPoint psoas_r-P3: femur_r (-0.01444758 -0.0511138 0.005034764)
        PathPoint psoas_r-P4: femur_r (-0.02572108 -0.05735253 0.009631723)
        PathWrap: wrap_object=PS_at_brim_r method=hybrid range=(2 3)
    Millard2012EquilibriumMuscle recfem_r: max_isometric_force=2191.741 optimal_fiber_length=0.08273579
        tendon_slack_length=0.4888862
      PointBasedPath geometrypath:
        PathPoint recfem_r-P1: pelvis (-0.02503197 -0.03844493 0.09731177)
        PathPoint recfem_r-P2: patella_r (0.01094514 0.05363118 0.0007661598)
        PathPoint recfem_r-P3: patella_r (0.01324362 0.04783026 -0.001094514)
        PathPoint recfem_r-P4: patella_r (0.00547257 0.002703449 3.283542e-5)
        PathPoint recfem_r-P5: tibia_r (0.03695788 -0.07155771 -0.0005328283)
        PathWrap: wrap_object=KnExt_at_fem_r method=hybrid
    Millard2012EquilibriumMuscle sart_r: max_isometric_force=249.4131 optimal_fiber_length=0.4392436
        tendon_slack_length=0.1351517 ignore_tendon_compliance=true
      PointBasedPath geometrypath:
        PathPoint sart_r-P1: pelvis (-0.02033847 -0.01545724 0.1101407)
        PathPoint sart_r-P2: femur_r (-0.003283542 -0.3905226 -0.04607904)
        PathPoint sart_r-P3: tibia_r (-0.0284553 -0.04546046 -0.04137922)
        PathPoint sart_r-P4: tibia_r (-0.01802547 -0.06790726 -0.02992908)
        PathPoint sart_r-P5: tibia_r (0.01541801 -0.09182785 -0.002947561)
    Millard2012EquilibriumMuscle semimem_r: max_isometric_force=2200.987 optimal_fiber_length=0.0763891
        tendon_slack_length=0.3848084
      PointBasedPath geometrypath:
        PathPoint semimem_r-P1: pelvis (-0.102944 -0.1129568 0.06404012)
        PathPoint semimem_r-P2: tibia_r (-0.03287664 -0.04727434 -0.02222007)
        PathWrap: wrap_object=SM_at_condyles_r method=hybrid
    Millard2012EquilibriumMuscle semiten_r: max_isometric_force=591.2951 optimal_fiber_length=0.214829
        tendon_slack_length=0.275158
      PointBasedPath geometrypath:
        PathPoint semiten_r-P1: pelvis (-0.1082633 -0.1241533 0.05371443)
        PathPoint semiten_r-P2: tibia_r (-0.03537073 -0.0575908 -0.02596121)
        PathPoint semiten_r-P3: tibia_r (0.002153987 -0.08763325 -0.01326402)
        PathWrap: wrap_object=ST_at_condyles_r method=hybrid
    Millard2012EquilibriumMuscle soleus_r: max_isometric_force=6194.843 optimal_fiber_length=0.05035423
        tendon_slack_length=0.3167234
      PointBasedPath geometrypath:
        PathPoint soleus_r-P1: tibia_r (-0.008615947 -0.1038448 0.01111004)
        PathPoint soleus_r-P2: calcn_r (0.004499184 0.0316988 -0.005419472)
    Millard2012EquilibriumMuscle tfl_r: max_isometric_force=411.2066 optimal_fiber_length=0.1024881
        tendon_slack_length=0.4849273
      PointBasedPath geometrypath:
        PathPoint tfl_r-P1: pelvis (-0.03243726 0.02120416 0.1294361)
        PathPoint tfl_r-P2: femur_r (0.03217871 -0.1089041 0.06534248)
        PathPoint tfl_r-P3: femur_r (0.0117113 -0.4432782 0.03546225)
        PathPoint tfl_r-P4: tibia_r (0.01224371 -0.04648077 0.03922523)
    Millard2012EquilibriumMuscle tibant_r: max_isometric_force=1227.452 optimal_fiber_length=0.0764791
        tendon_slack_length=0.2692568
      PointBasedPath geometrypath:
        PathPoint tibant_r-P1: tibia_r (0.01745863 -0.1487384 0.01836557)
        PathPoint tibant_r-P2: tibia_r (0.0284553 -0.2160789 0.01451107)
        PathPoint tibant_r-P3: tibia_r (0.02641468 -0.4148125 -0.01496454)
        PathPoint tibant_r-P4: calcn_r (0.1192284 0.01820124 -0.03118753)
    Millard2012EquilibriumMuscle tibpost_r: max_isometric_force=1730.154 optimal_fiber_length=0.04278824
        tendon_slack_length=0.3178324
      PointBasedPath geometrypath:
        PathPoint tibpost_r-P1: tibia_r (-0.004648077 -0.1478315 0.01167688)
        PathPoint tibpost_r-P2: tibia_r (-0.01859231 -0.414359 -0.01983935)
        PathPoint tibpost_r-P3: calcn_r (0.04263999 0.0341529 -0.0292447)
        PathPoint tibpost_r-P4: calcn_r (0.07894023 0.01625842 -0.02873343)
    Millard2012EquilibriumMuscle vasint_r: max_isometric_force=1697.361 optimal_fiber_length=0.1093077
        tendon_slack_length=0.2225901
      PointBasedPath geometrypath:
        PathPoint vasint_r-P1: femur_r (0.0317409 -0.2105845 0.03392993)
        PathPoint vasint_r-P2: femur_r (0.03666622 -0.2280967 0.03119365)
        PathPoint vasint_r-P3: patella_r (0.006348181 0.05253667 -0.0006567084)
        PathPoint vasint_r-P4: patella_r (0.00547257 0.002703449 -0.0004268604)
        PathPoint vasint_r-P5: tibia_r (0.03692387 -0.0716484 0.0004874812)
        PathWrap: wrap_object=KnExt_at_fem_r method=hybrid
    Millard2012EquilibriumMuscle vaslat_r: max_isometric_force=5148.767 optimal_fiber_length=0.1093856
        tendon_slack_length=0.2427627
      PointBasedPath geometrypath:
        PathPoint vaslat_r-P1: femur_r (0.005253667 -0.2029229 0.03819854)
        PathPoint vaslat_r-P2: femur_r (0.02944243 -0.2835886 0.04476562)
        PathPoint vaslat_r-P3: patella_r (0.01127349 0.04629794 0.01543265)
        PathPoint vaslat_r-P4: patella_r (0.00547257 0.002703449 0.008022787)
        PathPoint vaslat_r-P5: tibia_r (0.03688986 -0.07185246 0.005793091)
        PathWrap: wrap_object=KnExt_at_fem_r method=hybrid
    Millard2012EquilibriumMuscle vasmed_r: max_isometric_force=2747.823 optimal_fiber_length=0.1065823
        tendon_slack_length=0.2201059
      PointBasedPath geometrypath:
        PathPoint vasmed_r-P1: femur_r (0.0153232 -0.2297385 0.02057686)
        PathPoint vasmed_r-P2: femur_r (0.0389647 -0.3030709 0.0009850626)
        PathPoint vasmed_r-P3: patella_r (0.006895438 0.04870587 -0.01860674)
        PathPoint vasmed_r-P4: patella_r (0.00547257 0.002703449 -0.009303369)
        PathPoint vasmed_r-P5: tibia_r (0.0361643 -0.07206786 -0.007686331)
        PathWrap: wrap_object=KnExt_at_fem_r method=hybrid
    Millard2012EquilibriumMuscle addbrev_l: max_isometric_force=625.8197 optimal_fiber_length=0.111897
        tendon_slack_length=0.03847508 ignore_tendon_compliance=true
      PointBasedPath geometrypath:
        PathPoint addbrev_l-P1: pelvis (-0.01992127 -0.09313978 -0.01606218)
        PathPoint addbrev_l-P2: femur_l (-0.002189028 -0.1291526 -0.0272534)
        PathWrap: wrap_object=AB_at_femshaft_l method=hybrid
    Millard2012EquilibriumMuscle addlong_l: max_isometric_force=916.8 optimal_fiber_length=0.1183044
        tendon_slack_length=0.1441076
      PointBasedPath geometrypath:
        PathPoint addlong_l-P1: pelvis (-0.00790593 -0.08808645 -0.01969181)
        PathPoint addlong_l-P2: femur_l (0.01232423 -0.2619938 -0.01732616)
        PathWrap: wrap_object=AL_at_femshaft_l method=hybrid
    Millard2012EquilibriumMuscle addmagDist_l: max_isometric_force=597.2951 optimal_fiber_length=0.1973877
        tendon_slack_length=0.09733563 ignore_tendon_compliance=true
      PointBasedPath geometrypath:
        PathPoint addmagDist_l-P1: pelvis (-0.07722362 -0.1265017 -0.04153221)
        PathPoint addmagDist_l-P2: femur_l (0.01231328 -0.2873099 -0.02112412)
        PathWrap: wrap_object=AMdist_at_femshaft_l method=hybrid
    Millard2012EquilibriumMuscle addmagIsch_l: max_isometric_force=597.2951 optimal_fiber_length=0.1733116
        tendon_slack_length=0.2400432
      PointBasedPath geometrypath:
        PathPoint addmagIsch_l-P1: pelvis (-0.09347354 -0.1285725 -0.04350347)
        PathPoint addmagIsch_l-P2: femur_l (0.005264612 -0.4246386 0.03582344)
        PathWrap: wrap_object=AMisch_at_condyles_l method=hybrid
    Millard2012EquilibriumMuscle addmagMid_l: max_isometric_force=597.2951 optimal_fiber_length=0.1530011
        tendon_slack_length=0.05180894 ignore_tendon_compliance=true
      PointBasedPath geometrypath:
        PathPoint addmagMid_l-P1: pelvis (-0.05492431 -0.119645 -0.02976718)
        PathPoint addmagMid_l-P2: femur_l (0.002648724 -0.1777491 -0.0319817)
        PathWrap: wrap_object=AMmid_at_femshaft_l method=hybrid
    Millard2012EquilibriumMuscle addmagProx_l: max_isometric_force=597.2951 optimal_fiber_length=0.1139718
        tendon_slack_length=0.04352092 ignore_tendon_compliance=true
      PointBasedPath geometrypath:
        PathPoint addmagProx_l-P1: pelvis (-0.0323121 -0.1065658 -0.01423693)
        PathPoint addmagProx_l-P2: femur_l (-0.01671323 -0.08631337 -0.03504634)
        PathWrap: wrap_object=AMprox_at_femshaft_l method=hybrid
    Millard2012EquilibriumMuscle bflh_l: max_isometric_force=1313.184 optimal_fiber_length=0.1081936
        tendon_slack_length=0.3605272
      PointBasedPath geometrypath:
        PathPoint bflh_l-P1: pelvis (-0.1084719 -0.1180101 -0.06111972)
        PathPoint bflh_l-P2: tibia_l (-0.03820492 -0.0396787 -0.02868203)
        PathPoint bflh_l-P3: tibia_l (-0.03253654 -0.05158231 -0.03435042)
    Millard2012EquilibriumMuscle bfsh_l: max_isometric_force=557.1148 optimal_fiber_length=0.1214923
        tendon_slack_length=0.1165546 ignore_tendon_compliance=true
      PointBasedPath geometrypath:
        PathPoint bfsh_l-P1: femur_l (0.00547257 -0.2310519 -0.02561163)
        PathPoint bfsh_l-P2: tibia_l (-0.03412368 -0.04750108 -0.03605094)
        PathWrap: wrap_object=BF_at_gastroc_l method=hybrid
    Millard2012EquilibriumMuscle edl_l: max_isometric_force=603.4982 optimal_fiber_length=0.07610082
        tendon_slack_length=0.4050751
      PointBasedPath geometrypath:
        PathPoint edl_l-P1: tibia_l (-0.01813884 -0.1311665 -0.02324038)
        PathPoint edl_l-P2: tibia_l (0.01859231 -0.4262626 -0.01269718)
        PathPoint edl_l-P3: calcn_l (0.09397159 0.03681151 -0.0008180335)
        PathPoint edl_l-P4: calcn_l (0.1652428 0.00562398 -0.01329304)
        PathPoint edl_l-P5: toes_l (0.0003067625 0.004805947 -0.01564489)
        PathPoint edl_l-P6: toes_l (0.0452986 -0.0004090167 -0.02556355)
    Millard2012EquilibriumMuscle ehl_l: max_isometric_force=285.8675 optimal_fiber_length=0.08174854
        tendon_slack_length=0.3571529
      PointBasedPath geometrypath:
        PathPoint ehl_l-P1: tibia_l (-0.01587148 -0.17572 -0.0214265)
        PathPoint ehl_l-P2: tibia_l (0.008049108 -0.3297867 -0.01859231)
        PathPoint ehl_l-P3: tibia_l (0.02267354 -0.418667 0.003174296)
        PathPoint ehl_l-P4: calcn_l (0.09918656 0.03977688 0.02157563)
        PathPoint ehl_l-P5: calcn_l (0.1322147 0.03159654 0.02627933)
        PathPoint ehl_l-P6: calcn_l (0.1773088 0.01421333 0.02863117)
        PathPoint ehl_l-P7: toes_l (0.03047175 0.004192422 0.02505227)
        PathPoint ehl_l-P8: toes_l (0.05756911 0.003476642 0.01901928)
    Millard2012EquilibriumMuscle fdl_l: max_isometric_force=423.177 optimal_fiber_length=0.04859985
        tendon_slack_length=0.4127422
      PointBasedPath geometrypath:
        PathPoint fdl_l-P1: tibia_l (-0.002607458 -0.2076897 0.002040619)
        PathPoint fdl_l-P2: tibia_l (-0.01995272 -0.4132253 0.0140576)
        PathPoint fdl_l-P3: calcn_l (0.04458282 0.03221007 0.02863117)
        PathPoint fdl_l-P4: calcn_l (0.07239596 0.01799674 0.02689285)
        PathPoint fdl_l-P5: calcn_l (0.1695374 -0.008282589 -0.01186149)
        PathPoint fdl_l-P6: toes_l (-0.001942829 -0.007975826 -0.01503136)
        PathPoint fdl_l-P7: toes_l (0.02914244 -0.007260047 -0.02198465)
        PathPoint fdl_l-P8: toes_l (0.04509409 -0.006135251 -0.02474551)
    Millard2012EquilibriumMuscle fhl_l: max_isometric_force=907.8393 optimal_fiber_length=0.05713571
        tendon_slack_length=0.3841641
      PointBasedPath geometrypath:
        PathPoint fhl_l-P1: tibia_l (-0.03514399 -0.2452144 -0.02267354)
        PathPoint fhl_l-P2: tibia_l (-0.02743499 -0.4161729 0.008615947)
        PathPoint fhl_l-P3: calcn_l (0.03824306 0.02822215 0.02464326)
        PathPoint fhl_l-P4: calcn_l (0.1061398 0.006953284 0.02617707)
        PathPoint fhl_l-P5: calcn_l (0.1764907 -0.005419472 0.02750638)
        PathPoint fhl_l-P6: toes_l (0.0158494 -0.006544268 0.02709736)
        PathPoint fhl_l-P7: toes_l (0.05746685 -0.01042993 0.01850801)
    Millard2012EquilibriumMuscle gaslat_l: max_isometric_force=1575.059 optimal_fiber_length=0.06701207
        tendon_slack_length=0.4285926
      PointBasedPath geometrypath:
        PathPoint gaslat_l-P1: femur_l (-0.003283542 -0.4174476 -0.03031804)
        PathPoint gaslat_l-P2: calcn_l (0.004499184 0.0316988 0.005419472)
        PathWrap shank: wrap_object=GasLat_at_shank_l method=hybrid
        PathWrap condyles: wrap_object=Gastroc_at_condyles_l method=hybrid
    Millard2012EquilibriumMuscle gasmed_l: max_isometric_force=3115.515 optimal_fiber_length=0.05808278
        tendon_slack_length=0.4540893
      PointBasedPath geometrypath:
        PathPoint gasmed_l-P1: femur_l (0.008756112 -0.4146019 0.02276589)
        PathPoint gasmed_l-P2: calcn_l (0.004499184 0.0316988 0.005419472)
        PathWrap shank: wrap_object=GasMed_at_shank_l method=hybrid
        PathWrap condyles: wrap_object=Gastroc_at_condyles_l method=hybrid
    Millard2012EquilibriumMuscle glmax1_l: max_isometric_force=983.7836 optimal_fiber_length=0.1515889
        tendon_slack_length=0.05036555 ignore_tendon_compliance=true
      PointBasedPath geometrypath:
        PathPoint glmax1_l-P1: pelvis (-0.1283931 0.03418428 -0.05872082)
        PathPoint glmax1_l-P2: pelvis (-0.1311049 -0.02397854 -0.08124959)
        PathPoint glmax1_l-P3: femur_l (-0.04859642 -0.03568116 -0.03305432)
        PathPoint glmax1_l-P4: femur_l (-0.03031804 -0.06194949 -0.05144216)
        PathWrap: wrap_object=Gmax1_at_pelvis_l method=hybrid
    Millard2012EquilibriumMuscle glmax2_l: max_isometric_force=1406.046 optimal_fiber_length=0.164426
        tendon_slack_length=0.07109819 ignore_tendon_compliance=true
      PointBasedPath geometrypath:
        PathPoint glmax2_l-P1: pelvis (-0.1373629 0.008620384 -0.04818654)
        PathPoint glmax2_l-P2: pelvis (-0.140179 -0.06034269 -0.08479579)
        PathPoint glmax2_l-P3: femur_l (-0.04925313 -0.06391962 -0.02758175)
        PathPoint glmax2_l-P4: femur_l (-0.01707442 -0.1112026 -0.04586013)
        PathWrap: wrap_object=Gmax2_at_pelvis_l method=hybrid
    Millard2012EquilibriumMuscle glmax3_l: max_isometric_force=947.7541 optimal_fiber_length=0.1778495
        tendon_slack_length=0.0742459 ignore_tendon_compliance=true
      PointBasedPath geometrypath:
        PathPoint glmax3_l-P1: pelvis (-0.1355898 -0.05201956 -0.009386988)
        PathPoint glmax3_l-P2: pelvis (-0.1327737 -0.1251442 -0.04537044)
        PathPoint glmax3_l-P3: femur_l (-0.03075584 -0.1231328 -0.01028843)
        PathPoint glmax3_l-P4: femur_l (-0.006567084 -0.1553115 -0.04498452)
        PathWrap: wrap_object=Gmax3_at_pelvis_l method=hybrid
    Millard2012EquilibriumMuscle glmed1_l: max_isometric_force=1093.467 optimal_fiber_length=0.07384628
        tendon_slack_length=0.05646391 ignore_tendon_compliance=true
      PointBasedPath geometrypath:
        PathPoint glmed1_l-P1: pelvis (-0.04641344 0.02427579 -0.1222394)
        PathPoint glmed1_l-P2: femur_l (-0.0238604 -0.01280581 -0.06074552)
    Millard2012EquilibriumMuscle glmed2_l: max_isometric_force=765.0917 optimal_fiber_length=0.0742356
        tendon_slack_length=0.06635321 ignore_tendon_compliance=true
      PointBasedPath geometrypath:
        PathPoint glmed2_l-P1: pelvis (-0.08865488 0.03131082 -0.07040241)
        PathPoint glmed2_l-P2: femur_l (-0.02823846 -0.006348181 -0.05768089)
    Millard2012EquilibriumMuscle glmed3_l: max_isometric_force=871.1993 optimal_fiber_length=0.07558577
        tendon_slack_length=0.04683506 ignore_tendon_compliance=true
      PointBasedPath geometrypath:
        PathPoint glmed3_l-P1: pelvis (-0.1201534 -0.007233195 -0.05486173)
        PathPoint glmed3_l-P2: femur_l (-0.03382048 -0.005144216 -0.05669582)
    Millard2012EquilibriumMuscle glmin1_l: max_isometric_force=374.0459 optimal_fiber_length=0.06980625
        tendon_slack_length=0.01656644 ignore_tendon_compliance=true
      PointBasedPath geometrypath:
        PathPoint glmin1_l-P1: pelvis (-0.04839514 -0.01476365 -0.1086805)
        PathPoint glmin1_l-P2: femur_l (-0.007880501 -0.01138295 -0.06129278)
    Millard2012EquilibriumMuscle glmin2_l: max_isometric_force=394.8197 optimal_fiber_length=0.05762357
        tendon_slack_length=0.02685572 ignore_tendon_compliance=true
      PointBasedPath geometrypath:
        PathPoint glmin2_l-P1: pelvis (-0.06424872 -0.01407005 -0.1012752)
        PathPoint glmin2_l-P2: femur_l (-0.01050733 -0.01138295 -0.06129278)
    Millard2012EquilibriumMuscle glmin3_l: max_isometric_force=446.7738 optimal_fiber_length=0.03937675
        tendon_slack_length=0.05271563
      PointBasedPath geometrypath:
        PathPoint glmin3_l-P1: pelvis (-0.08229259 -0.01535815 -0.08323129)
        PathPoint glmin3_l-P2: femur_l (-0.01477594 -0.009084466 -0.06019827)
    Millard2012EquilibriumMuscle grac_l: max_isometric_force=281.3115 optimal_fiber_length=0.253602
        tendon_slack_length=0.1914971 ignore_tendon_compliance=true
      PointBasedPath geometrypath:
        PathPoint grac_l-P1: pelvis (-0.04939641 -0.1281366 -0.02561605)
        PathPoint grac_l-P2: tibia_l (-0.02088233 -0.05390635 0.03356818)
        PathPoint grac_l-P3: tibia_l (0.002017945 -0.07892661 0.01783274)
        PathWrap: wrap_object=GR_at_condyles_l method=hybrid
    Millard2012EquilibriumMuscle iliacus_l: max_isometric_force=1021.141 optimal_fiber_length=0.1098952
        tendon_slack_length=0.09909193 ignore_tendon_compliance=true
      PointBasedPath geometrypath:
        PathPoint iliacus_l-P1: pelvis (-0.06310142 0.03061722 -0.08792478)
        PathPoint iliacus_l-P2: pelvis (-0.01408048 -0.05519027 -0.0788507)
        PathPoint iliacus_l-P3: femur_l (-0.002517382 -0.06184004 -0.01521374)
        PathPoint iliacus_l-P4: femur_l (-0.01335307 -0.06972054 -0.02145247)
        PathWrap: wrap_object=IL_at_brim_l method=hybrid range=(2 3)
    Millard2012EquilibriumMuscle perbrev_l: max_isometric_force=521.2016 optimal_fiber_length=0.0504315
        tendon_slack_length=0.1638774
      PointBasedPath geometrypath:
        PathPoint perbrev_l-P1: tibia_l (-0.02754836 -0.2870471 -0.0284553)
        PathPoint perbrev_l-P2: tibia_l (-0.03843166 -0.4413405 -0.02822856)
        PathPoint perbrev_l-P3: tibia_l (-0.0323098 -0.4539244 -0.02890877)
        PathPoint perbrev_l-P4: calcn_l (0.04816172 0.02760863 -0.02382522)
        PathPoint perbrev_l-P5: calcn_l (0.06922608 0.02239367 -0.03507318)
    Millard2012EquilibriumMuscle perlong_l: max_isometric_force=1115.371 optimal_fiber_length=0.05606992
        tendon_slack_length=0.3666849
      PointBasedPath geometrypath:
        PathPoint perlong_l-P1: tibia_l (-0.02267354 -0.1556539 -0.0319697)
        PathPoint perlong_l-P2: tibia_l (-0.03593757 -0.4421341 -0.02686815)
        PathPoint perlong_l-P3: tibia_l (-0.03083602 -0.455058 -0.02720825)
        PathPoint perlong_l-P4: calcn_l (0.04478733 0.02351846 -0.02259817)
        PathPoint perlong_l-P5: calcn_l (0.0696351 0.01083894 -0.02904019)
        PathPoint perlong_l-P6: calcn_l (0.08712056 0.007055539 -0.01206599)
        PathPoint perlong_l-P7: calcn_l (0.1230118 0.008691606 0.01881477)
    Millard2012EquilibriumMuscle piri_l: max_isometric_force=1029.787 optimal_fiber_length=0.02700842
        tendon_slack_length=0.1193629
      PointBasedPath geometrypath:
        PathPoint piri_l-P1: pelvis (-0.1061877 -0.006470242 -0.01409091)
        PathPoint piri_l-P2: pelvis (-0.1064067 -0.03037942 -0.06353948)
        PathPoint piri_l-P3: femur_l (-0.01619881 -0.00394025 -0.04783026)
    Millard2012EquilibriumMuscle psoas_l: max_isometric_force=1426.79 optimal_fiber_length=0.1197608
        tendon_slack_length=0.1019792 ignore_tendon_compliance=true
      PointBasedPath geometrypath:
        PathPoint psoas_l-P1: pelvis (-0.06320572 0.06143262 -0.04067695)
        PathPoint psoas_l-P2: pelvis (-0.02138147 -0.0648015 -0.06842071)
        PathPoint psoas_l-P3: femur_l (-0.01444758 -0.0511138 -0.005034764)
        PathPoint psoas_l-P4: femur_l (-0.02572108 -0.05735253 -0.009631723)
        PathWrap: wrap_object=PS_at_brim_l method=hybrid range=(2 3)
    Millard2012EquilibriumMuscle recfem_l: max_isometric_force=2191.741 optimal_fiber_length=0.08273579
        tendon_slack_length=0.4888862
      PointBasedPath geometrypath:
        PathPoint recfem_l-P1: pelvis (-0.02503197 -0.03844493 -0.09731177)
        PathPoint recfem_l-P2: patella_l (0.01094514 0.05363118 -0.0007661598)
        PathPoint recfem_l-P3: patella_l (0.01324362 0.04783026 0.001094514)
        PathPoint recfem_l-P4: patella_l (0.00547257 0.002703449 -3.283542e-5)
        PathPoint recfem_l-P5: tibia_l (0.03695788 -0.07155771 0.0005328283)
        PathWrap: wrap_object=KnExt_at_fem_l method=hybrid
    Millard2012EquilibriumMuscle sart_l: max_isometric_force=249.4131 optimal_fiber_length=0.4392436
        tendon_slack_length=0.1351517 ignore_tendon_compliance=true
      PointBasedPath geometrypath:
        PathPoint sart_l-P1: pelvis (-0.02033847 -0.01545724 -0.1101407)
        PathPoint sart_l-P2: femur_l (-0.003283542 -0.3905226 0.04607904)
        PathPoint sart_l-P3: tibia_l (-0.0284553 -0.04546046 0.04137922)
        PathPoint sart_l-P4: tibia_l (-0.01802547 -0.06790726 0.02992908)
        PathPoint sart_l-P5: tibia_l (0.01541801 -0.09182785 0.002947561)
    Millard2012EquilibriumMuscle semimem_l: max_isometric_force=2200.987 optimal_fiber_length=0.0763891
        tendon_slack_length=0.3848084
      PointBasedPath geometrypath:
        PathPoint semimem_l-P1: pelvis (-0.102944 -0.1129568 -0.06404012)
        PathPoint semimem_l-P2: tibia_l (-0.03287664 -0.04727434 0.02222007)
        PathWrap: wrap_object=SM_at_condyles_l method=hybrid
    Millard2012EquilibriumMuscle semiten_l: max_isometric_force=591.2951 optimal_fiber_length=0.214829
        tendon_slack_length=0.275158
      PointBasedPath geometrypath:
        PathPoint semiten_l-P1: pelvis (-0.1082633 -0.1241533 -0.05371443)
        PathPoint semiten_l-P2: tibia_l (-0.03537073 -0.0575908 0.02596121)
        PathPoint semiten_l-P3: tibia_l (0.002153987 -0.08763325 0.01326402)
        PathWrap: wrap_object=ST_at_condyles_l method=hybrid
    Millard2012EquilibriumMuscle soleus_l: max_isometric_force=6194.843 optimal_fiber_length=0.05035423
        tendon_slack_length=0.3167234
      PointBasedPath geometrypath:
        PathPoint soleus_l-P1: tibia_l (-0.008615947 -0.1038448 -0.01111004)
        PathPoint soleus_l-P2: calcn_l (0.004499184 0.0316988 0.005419472)
    Millard2012EquilibriumMuscle tfl_l: max_isometric_force=411.2066 optimal_fiber_length=0.1024881
        tendon_slack_length=0.4849273
      PointBasedPath geometrypath:
        PathPoint tfl_l-P1: pelvis (-0.03243726 0.02120416 -0.1294361)
        PathPoint tfl_l-P2: femur_l (0.03217871 -0.1089041 -0.06534248)
        PathPoint tfl_l-P3: femur_l (0.0117113 -0.4432782 -0.03546225)
        PathPoint tfl_l-P4: tibia_l (0.01224371 -0.04648077 -0.03922523)
    Millard2012EquilibriumMuscle tibant_l: max_isometric_force=1227.452 optimal_fiber_length=0.0764791
        tendon_slack_length=0.2692568
      PointBasedPath geometrypath:
        PathPoint tibant_l-P1: tibia_l (0.01745863 -0.1487384 -0.01836557)
        PathPoint tibant_l-P2: tibia_l (0.0284553 -0.2160789 -0.01451107)
        PathPoint tibant_l-P3: tibia_l (0.02641468 -0.4148125 0.01496454)
        PathPoint tibant_l-P4: calcn_l (0.1192284 0.01820124 0.03118753)
    Millard2012EquilibriumMuscle tibpost_l: max_isometric_force=1730.154 optimal_fiber_length=0.04278824
        tendon_slack_length=0.3178324
      PointBasedPath geometrypath:
        PathPoint tibpost_l-P1: tibia_l (-0.004648077 -0.1478315 -0.01167688)
        PathPoint tibpost_l-P2: tibia_l (-0.01859231 -0.414359 0.01983935)
        PathPoint tibpost_l-P3: calcn_l (0.04263999 0.0341529 0.0292447)
        PathPoint tibpost_l-P4: calcn_l (0.07894023 0.01625842 0.02873343)
    Millard2012EquilibriumMuscle vasint_l: max_isometric_force=1697.361 optimal_fiber_length=0.1093077
        tendon_slack_length=0.2225901
      PointBasedPath geometrypath:
        PathPoint vasint_l-P1: femur_l (0.0317409 -0.2105845 -0.03392993)
        PathPoint vasint_l-P2: femur_l (0.03666622 -0.2280967 -0.03119365)
        PathPoint vasint_l-P3: patella_l (0.006348181 0.05253667 0.0006567084)
        PathPoint vasint_l-P4: patella_l (0.00547257 0.002703449 0.0004268604)
        PathPoint vasint_l-P5: tibia_l (0.03692387 -0.0716484 -0.0004874812)
        PathWrap: wrap_object=KnExt_at_fem_l method=hybrid
    Millard2012EquilibriumMuscle vaslat_l: max_isometric_force=5148.767 optimal_fiber_length=0.1093856
        tendon_slack_length=0.2427627
      PointBasedPath geometrypath:
        PathPoint vaslat_l-P1: femur_l (0.005253667 -0.2029229 -0.03819854)
        PathPoint vaslat_l-P2: femur_l (0.02944243 -0.2835886 -0.04476562)
        PathPoint vaslat_l-P3: patella_l (0.01127349 0.04629794 -0.01543265)
        PathPoint vaslat_l-P4: patella_l (0.00547257 0.002703449 -0.008022787)
        PathPoint vaslat_l-P5: tibia_l (0.03688986 -0.07185246 -0.005793091)
        PathWrap: wrap_object=KnExt_at_fem_l method=hybrid
    Millard2012EquilibriumMuscle vasmed_l: max_isometric_force=2747.823 optimal_fiber_length=0.1065823
        tendon_slack_length=0.2201059
      PointBasedPath geometrypath:
        PathPoint vasmed_l-P1: femur_l (0.0153232 -0.2297385 -0.02057686)
        PathPoint vasmed_l-P2: femur_l (0.0389647 -0.3030709 -0.0009850626)
        PathPoint vasmed_l-P3: patella_l (0.006895438 0.04870587 0.01860674)
        PathPoint vasmed_l-P4: patella_l (0.00547257 0.002703449 0.009303369)
        PathPoint vasmed_l-P5: tibia_l (0.0361643 -0.07206786 0.007686331)
        PathWrap: wrap_object=KnExt_at_fem_l method=hybrid
    CoordinateActuator lumbar_ext: coordinate=lumbar_extension optimal_force=10
    CoordinateActuator lumbar_bend: coordinate=lumbar_bending optimal_force=10
    CoordinateActuator lumbar_rot: coordinate=lumbar_rotation optimal_force=10
    CoordinateActuator shoulder_flex_r: coordinate=arm_flex_r optimal_force=10
    CoordinateActuator shoulder_add_r: coordinate=arm_add_r optimal_force=10
    CoordinateActuator shoulder_rot_r: coordinate=arm_rot_r optimal_force=10
    CoordinateActuator elbow_flex_r: coordinate=elbow_flex_r optimal_force=10
    CoordinateActuator pro_sup_r: coordinate=pro_sup_r optimal_force=10
    CoordinateActuator wrist_flex_r: coordinate=wrist_flex_r optimal_force=10
    CoordinateActuator wrist_dev_r: coordinate=wrist_dev_r optimal_force=10
    CoordinateActuator shoulder_flex_l: coordinate=arm_flex_l optimal_force=10
    CoordinateActuator shoulder_add_l: coordinate=arm_add_l optimal_force=10
    CoordinateActuator shoulder_rot_l: coordinate=arm_rot_l optimal_force=10
    CoordinateActuator elbow_flex_l: coordinate=elbow_flex_l optimal_force=10
    CoordinateActuator pro_sup_l: coordinate=pro_sup_l optimal_force=10
    CoordinateActuator wrist_flex_l: coordinate=wrist_flex_l optimal_force=10
    CoordinateActuator wrist_dev_l: coordinate=wrist_dev_l optimal_force=10
    ObjectGroup right_leg: members=(addbrev_r addlong_r addmagDist_r addmagIsch_r addmagMid_r addmagProx_r bflh_r bfsh_r edl_r ehl_r fdl_r fhl_r gaslat_r gasmed_r glmax1_r glmax2_r glmax3_r glmed1_r glmed2_r glmed3_r glmin1_r glmin2_r glmin3_r grac_r iliacus_r perbrev_r perlong_r piri_r psoas_r recfem_r sart_r semimem_r semiten_r soleus_r tfl_r tibant_r tibpost_r vasint_r vaslat_r vasmed_r)
    ObjectGroup left_leg: members=(addbrev_l addlong_l addmagDist_l addmagIsch_l addmagMid_l addmagProx_l bflh_l bfsh_l edl_l ehl_l fdl_l fhl_l gaslat_l gasmed_l glmax1_l glmax2_l glmax3_l glmed1_l glmed2_l glmed3_l glmin1_l glmin2_l glmin3_l grac_l iliacus_l perbrev_l perlong_l piri_l psoas_l recfem_l sart_l semimem_l semiten_l soleus_l tfl_l tibant_l tibpost_l vasint_l vaslat_l vasmed_l)
    ObjectGroup hip_add_r: members=(addbrev_r addlong_r addmagDist_r addmagIsch_r addmagMid_r addmagProx_r bflh_r grac_r semimem_r semiten_r)
    ObjectGroup hip_abd_r: members=(glmax1_r glmed1_r glmed2_r glmed3_r glmin1_r glmin2_r glmin3_r piri_r sart_r tfl_r)
    ObjectGroup hip_flex_r: members=(addbrev_r addlong_r glmin1_r grac_r iliacus_r psoas_r recfem_r sart_r tfl_r)
    ObjectGroup hip_ext_r: members=(addlong_r addmagDist_r addmagIsch_r addmagMid_r addmagProx_r bflh_r glmax1_r glmax2_r glmax3_r glmed1_r glmed2_r glmed3_r glmin3_r semimem_r semiten_r)
    ObjectGroup hip_inrot_r: members=(glmed1_r glmed2_r glmed3_r glmin1_r iliacus_r psoas_r tfl_r)
    ObjectGroup hip_exrot_r: members=(glmin3_r piri_r)
    ObjectGroup knee_flex_r: members=(bflh_r bfsh_r gaslat_r gasmed_r grac_r sart_r semimem_r semiten_r)
    ObjectGroup knee_ext_r: members=(recfem_r vasint_r vaslat_r vasmed_r)
    ObjectGroup ankle_df_r: members=(edl_r ehl_r tibant_r)
    ObjectGroup ankle_pf_r: members=(fdl_r fhl_r gaslat_r gasmed_r perbrev_r perlong_r soleus_r tibpost_r)
    ObjectGroup everter_r: members=(edl_r perbrev_r perlong_r)
    ObjectGroup inverter_r: members=(ehl_r fdl_r fhl_r tibant_r tibpost_r)
    ObjectGroup hip_add_l: members=(addbrev_l addlong_l addmagDist_l addmagIsch_l addmagMid_l addmagProx_l bflh_l grac_l semimem_l semiten_l)
    ObjectGroup hip_abd_l: members=(glmax1_l glmed1_l glmed2_l glmed3_l glmin1_l glmin2_l glmin3_l piri_l sart_l tfl_l)
    ObjectGroup hip_flex_l: members=(addbrev_l addlong_l glmin1_l grac_l iliacus_l psoas_l recfem_l sart_l tfl_l)
    ObjectGroup hip_ext_l: members=(addlong_l addmagDist_l addmagIsch_l addmagMid_l addmagProx_l bflh_l glmax1_l glmax2_l glmax3_l glmed1_l glmed2_l glmed3_l glmin3_l semimem_l semiten_l)
    ObjectGroup hip_exrot_l: members=(glmin3_l piri_l)
    ObjectGroup hip_inrot_l: members=(glmed1_l glmed2_l glmed3_l glmin1_l iliacus_l psoas_l tfl_l)
    ObjectGroup knee_flex_l: members=(bflh_l bfsh_l gaslat_l gasmed_l grac_l sart_l semimem_l semiten_l)
    ObjectGroup knee_ext_l: members=(recfem_l vasint_l vaslat_l vasmed_l)
    ObjectGroup ankle_df_l: members=(edl_l ehl_l tibant_l)
    ObjectGroup ankle_pf_l: members=(fdl_l fhl_l gaslat_l gasmed_l perbrev_l perlong_l soleus_l tibpost_l)
    ObjectGroup everter_l: members=(edl_l perbrev_l perlong_l)
    ObjectGroup inverter_l: members=(ehl_l fdl_l fhl_l tibant_l tibpost_l)
  MarkerSet:
    Marker RTAD: femur_r (0.09644846 -0.2528075 -0.002311931)
    Marker RTAP: femur_r (0.10762 -0.1202617 0.01728242)
    Marker RTL: femur_r (0.01412209 -0.2124611 0.1069368)
    Marker RHFIB: tibia_r (-0.01502078 -0.08332516 0.05650425)
    Marker RTTUB: tibia_r (0.04033161 -0.08684671 0.002600409)
    Marker RSTL: calcn_r (0.05524345 0.02727097 -0.04153841)
    Marker RM2B: calcn_r (0.1574679 0.0404925 0.02272816)
    Marker LTAP: femur_l (0.111622 -0.116124 -0.01454997)
    Marker LTL: femur_l (0.01069794 -0.2173604 -0.1038342)
    Marker LTAD: femur_l (0.1098893 -0.2347309 -0.003044171)
    Marker LTTUB: tibia_l (0.03927438 -0.08240913 0.001501231)
    Marker LSSH: tibia_l (0.03247625 -0.2883689 -0.002076165)
    Marker LSTL: calcn_l (0.0552583 0.0281607 0.04063019)
    Marker LM2B: calcn_l (0.1609258 0.04349574 -0.0126748)
    Marker LHFIB: tibia_l (-0.01270581 -0.07764864 -0.06006857)
    Marker RTPP: femur_r (-0.1102519 -0.2243581 0.0460068)
    Marker RTPD: femur_r (-0.1014289 -0.3268462 0.02786105)
    Marker LTPP: femur_l (-0.1087014 -0.2245347 -0.03106109)
    Marker LTPD: femur_l (-0.1046483 -0.3232074 -0.006687162)
    Marker RSSH: tibia_r (0.03501679 -0.1764909 -0.003085761)
    Marker RACR: torso (-0.00359402 0.3474314 0.1739367) fixed=true
    Marker LACR: torso (-0.003752785 0.3538259 -0.1876141) fixed=true
    Marker SA: torso (0.09801749 0.2967142 -0.006351936) fixed=true
    Marker RHLE: humerus_r (0.01374173 -0.3256354 0.0322683) fixed=true
    Marker RHME: humerus_r (-0.01472236 -0.3327616 -0.03894819) fixed=true
    Marker LHLE: humerus_l (0.01879258 -0.3113495 -0.03026994) fixed=true
    Marker LHME: humerus_l (-0.0117201 -0.3171164 0.04404687) fixed=true
    Marker RASIS: pelvis (0.0319 -0.02907 0.1209) fixed=true
    Marker LASIS: pelvis (0.0244 -0.029735 -0.1267) fixed=true
    Marker RPSIS: pelvis (-0.1583 0.0076 0.0555) fixed=true
    Marker LPSIS: pelvis (-0.1639 0.008265 -0.0462) fixed=true
    Marker RFLE: femur_r (-0.01728402 -0.4657273 0.05651239) fixed=true
    Marker RFME: femur_r (0 -0.4421836 -0.0547257) fixed=true
    Marker RLMAL: tibia_r (-0.021397 -0.433938 0.04725627) fixed=true
    Marker RMMAL: tibia_r (0.001291893 -0.4286558 -0.04588298) fixed=true
    Marker RCAL: calcn_r (-0.005057581 0.03562725 -0.01127605) fixed=true
    Marker RM5D: calcn_r (0.1640066 0.007932682 0.0641943) fixed=true
    Marker RM1D: calcn_r (0.2106416 0.02863187 -0.01745887) fixed=true
    Marker LFLE: femur_l (0.004233312 -0.4631952 -0.04893122) fixed=true
    Marker LFME: femur_l (0 -0.4421836 0.0547257) fixed=true
    Marker LLMAL: tibia_l (-0.0190272 -0.4374135 -0.05104572) fixed=true
    Marker LMMAL: tibia_l (0.001291893 -0.4286558 0.04588298) fixed=true
    Marker LCAL: calcn_l (-0.004187561 0.03356212 0.008506172) fixed=true
    Marker LM5D: calcn_l (0.1630698 0.008365595 -0.06619139) fixed=true
    Marker LM1D: calcn_l (0.2063572 0.02840419 0.01982621) fixed=true
    Marker RCB: torso (0.08256611 0.5150294 0.06406321) fixed=true
    Marker T10: torso (-0.08344054 0.1147291 -0.0004952351) fixed=true
    Marker IJ: torso (0.06531804 0.3353074 -0.007079236) fixed=true
    Marker LCB: torso (0.08056601 0.5167322 -0.06716289) fixed=true
    Marker T2: torso (-0.1101084 0.3541972 -0.0003055672) fixed=true
    Marker IN: torso (-0.06896671 0.4390995 0.0004683946) fixed=true
    Marker LUSP: radius_l (0.01457394 -0.2428621 -0.01963604) fixed=true
    Marker RUSP: radius_r (0.01456977 -0.2449123 0.01934642) fixed=true
